# -*- coding: utf-8 -*-
"""
Better finger: one chamber of a single-channel PneuNet (pneumatic network)
soft finger actuator, inflated with air (FEM pressure-cavity test).

Derived from ../PneuNetFinger/PneuNetFinger.py. The one change: the far-end
plane of each channel duct (the midpoint to the neighbouring chamber, see
`channel_separation_blocks`) is held by a HARD constraint instead of a
stiff-spring truss. Its ring of FEM nodes is rigidly mapped from a Rigid3
frame whose only free motions are translation along X and rotation about
Y -- the two DOF a bending finger's chamber boundary has -- so the plane's
cross-section stays an exact rigid copy of its rest shape. That makes it
possible to place copies of this chamber side by side (each rotated/shifted
by the neighbour's end-plane motion) and have them meet exactly, to show a
whole finger from one simulated chamber. See createScene's "cube" section.

Adapted from the HollowCube test bed: a hollow box shell is meshed
procedurally (no external mesh files), clamped on part of its bottom
face to a rigid "trunk" raising it one block above the floor (see
ATTACH_*/BASE_OFFSET), and its internal cavity is inflated by ramping
up an air pressure via the SoftRobots SurfacePressureConstraint. Unlike
HollowCube, the cavity has openings on its bottom face, in the X
direction, to the (unmodeled) adjacent chambers' cavities that a real
multi-chamber PneuNet finger would connect to through its base channel.

Units are SI throughout: metres, kilograms, seconds, pascals, newtons.

Run with the GUI -- SofaPython3 must be loaded explicitly (-l), and the
GUI backend must be given explicitly too (-g), otherwise the plugin
autoload / default-GUI resolution doesn't pick either up reliably:
    runSofa.exe -l SofaPython3 -g imgui PneuNetFinger.py   (default:
        docked Scene Graph/Viewport/Log panels, but its background is a
        branded backdrop baked into its own rendering code -- neither the
        scene's BackgroundSetting component nor GUIManager.set
        BackgroundImage() can override it, confirmed by testing both)
    runSofa.exe -l SofaPython3 -g glfw  PneuNetFinger.py   (older,
        plainer single-viewport GUI, but it DOES respect BackgroundSetting
        -- use this one if you want the plain light-blue background)
See run_imgui.bat / run_glfw.bat for one-click shortcuts to each.

Run headless (prints cavity pressure/volume to the console):
    python PneuNetFinger.py
(requires a Python whose ABI matches the SOFA build, see README.md)

Parameters (block size, box dimensions and wall thickness in blocks,
material, target pressure, ramp time, instant mode) live in params.json
next to this script, created
with defaults on first run. Edit it by hand, or with the standalone
editor (edit_params.bat / `python params_editor.py`) -- an independent
Tkinter window, no SOFA dependency, doesn't touch a running session
directly. After Save: geometry/material changes need the SOFA GUI's
Reload button; target pressure/ramp time/instant are ALSO live-editable
while the sim is running, directly in the Scene Graph panel (select the
"PressureRamp" node), no reload needed for those.
"""
import itertools
import json
import math
import os
import subprocess

import Sofa
import Sofa.Core


def _look_at_quaternion(eye, target, world_up=(0.0, 0.0, 1.0)):
    """Camera orientation quaternion [x, y, z, w] for a camera at `eye`
    looking towards `target`, with `world_up` as the world's vertical
    axis. Assumes the standard OpenGL camera convention (local -Z is the
    view direction, local +Y is up, local +X is right) that SOFA's
    BaseCamera also follows.
    """
    def sub(a, b):
        return (a[0] - b[0], a[1] - b[1], a[2] - b[2])

    def cross(a, b):
        return (a[1] * b[2] - a[2] * b[1],
                a[2] * b[0] - a[0] * b[2],
                a[0] * b[1] - a[1] * b[0])

    def normalize(v):
        n = math.sqrt(v[0] ** 2 + v[1] ** 2 + v[2] ** 2)
        return (v[0] / n, v[1] / n, v[2] / n)

    forward = normalize(sub(target, eye))
    right = normalize(cross(forward, world_up))
    up = cross(right, forward)

    # Camera-to-world rotation matrix, columns = local axes (right, up,
    # -forward) expressed in world space -- matches sofa::type::Quat's
    # own quaternion-to-matrix convention (see Quat.h, toMatrix()).
    m00, m01, m02 = right[0], up[0], -forward[0]
    m10, m11, m12 = right[1], up[1], -forward[1]
    m20, m21, m22 = right[2], up[2], -forward[2]

    trace = m00 + m11 + m22
    if trace > 0:
        s = math.sqrt(trace + 1.0) * 2
        qw = 0.25 * s
        qx = (m21 - m12) / s
        qy = (m02 - m20) / s
        qz = (m10 - m01) / s
    elif m00 > m11 and m00 > m22:
        s = math.sqrt(1.0 + m00 - m11 - m22) * 2
        qw = (m21 - m12) / s
        qx = 0.25 * s
        qy = (m01 + m10) / s
        qz = (m02 + m20) / s
    elif m11 > m22:
        s = math.sqrt(1.0 + m11 - m00 - m22) * 2
        qw = (m02 - m20) / s
        qx = (m01 + m10) / s
        qy = 0.25 * s
        qz = (m12 + m21) / s
    else:
        s = math.sqrt(1.0 + m22 - m00 - m11) * 2
        qw = (m10 - m01) / s
        qx = (m02 + m20) / s
        qy = (m12 + m21) / s
        qz = 0.25 * s

    return [qx, qy, qz, qw]


# ----------------------------------------------------------------------
# Parameters -- loaded from params.json next to this script, so they can
# be edited without touching code (by hand, or with params_editor.py).
# The file is created with these defaults on first run if missing.
#
# The box is built from cube-shaped "blocks" of a single elementary size:
# `block_size` sets that size, `length_blocks`/`width_blocks`/
# `height_blocks` set the outer box's extent in X/Y/Z as a count of those
# blocks, and `wall_length_blocks`/`wall_width_blocks`/`wall_height_blocks`
# set the shell's thickness -- in blocks -- on the pair of faces
# perpendicular to each axis (e.g. `wall_height_blocks` is how many
# blocks thick the top and bottom shell is). `trunk_length_blocks`/
# `trunk_width_blocks` set the footprint (centered, in blocks along X/Y)
# of the rigid "trunk" attaching the box to fixed world -- see
# _resolve_trunk_axis. These only take effect on scene (re)build -- after
# editing them, use the GUI's Reload button, there is no way to resize a
# mesh that's already been built and is mid-simulation.
# `target_pressure`/`ramp_time`/`instant` seed the PressureRamp
# controller's initial values, but are ALSO exposed as live-editable
# Data fields on that controller once the scene is running (select the
# "PressureRamp" node in the Scene Graph panel) -- editing params.json
# again would only apply on the next reload, not retroactively.
# ----------------------------------------------------------------------
_SCRIPT_DIR = os.path.dirname(os.path.abspath(__file__))
PARAMS_FILE = os.path.join(_SCRIPT_DIR, 'params.json')

_DEFAULT_PARAMS = {
    'block_size': 10.0,          # elementary block edge length [mm]
    'length_blocks': 6,          # box extent along X, in blocks
    'width_blocks': 10,          # box extent along Y, in blocks
    'height_blocks': 8,          # box extent along Z (vertical), in blocks
    'wall_length_blocks': 1,     # shell thickness on the +-X faces, in blocks
                                  # (>=1; >=2 needed for a believable bending
                                  # response -- see build_hollow_cube_mesh)
    'wall_width_blocks': 1,      # shell thickness on the +-Y faces, in blocks
    'wall_height_blocks': 1,     # shell thickness on the +-Z (top/bottom)
                                  # faces, in blocks
    'trunk_length_blocks': 6,    # footprint of the rigid "trunk" attaching
    'trunk_width_blocks': 10,    # the box to fixed world, in blocks along
                                  # X/Y -- always centered; snapped to the
                                  # same odd/even parity as length_blocks/
                                  # width_blocks respectively so it stays
                                  # exactly grid-aligned (see
                                  # _resolve_trunk_axis). Defaults to the
                                  # whole footprint, matching length_blocks/
                                  # width_blocks above.
    'floor_size_blocks': 30,     # edge length of the square green ground
                                  # plane, in blocks (purely visual, centered
                                  # at the world origin).
    'channel_height_blocks': 2,  # height (in blocks, from the cavity
                                  # floor upward) of the connecting-channel
                                  # openings carved through both -X/+X end
                                  # walls, spanning the full width of the
                                  # air cavity -- representing the base
                                  # channel a real multi-chamber PneuNet
                                  # finger uses to connect this chamber's
                                  # cavity to its neighbors'. 0 disables
                                  # (fully closed end walls, like
                                  # HollowCube). Clamped so it can't
                                  # exceed the cavity's own interior
                                  # height -- see build_hollow_cube_mesh.
    'channel_separation_blocks': 0.0,  # full gap (in blocks -- may be a
                                  # fraction, e.g. 0.5) between this
                                  # chamber and its neighbor at rest, i.e.
                                  # the length of connecting-channel
                                  # tunnel between the two. Half of this
                                  # (rounded to nothing -- fractional
                                  # blocks are fine, see
                                  # build_hollow_cube_mesh) is modeled as
                                  # an actual hollow FEM duct extending
                                  # past each end wall's channel opening,
                                  # capped flat at the far end -- a new
                                  # symmetry plane at the true midpoint of
                                  # the real tunnel, for a symmetry
                                  # boundary condition to be added there
                                  # later. 0 disables it (the channel
                                  # opening stays a bare hole with nothing
                                  # beyond it). No effect if
                                  # channel_height_blocks is 0.
    'channel_end_constraint': True,  # hold the far-end plane of each
                                  # built channel duct (see
                                  # channel_separation_blocks above) as a
                                  # rigid cross-section free only to
                                  # translate along X and rotate about Y
                                  # -- the two DOF a bending finger needs
                                  # -- via its own reduced-DOF Rigid3 body
                                  # rigidly (stiff-spring) coupled to that
                                  # plane's real shell nodes. No effect if
                                  # no duct is built there.
    'channel_end_alpha': 0.0,    # opacity of a flat, distinctly-colored
                                  # visual plane marking the far-end
                                  # symmetry plane of each built channel
                                  # duct (see channel_separation_blocks),
                                  # 0 (invisible, the default) .. 1
                                  # (opaque) -- purely a visual aid for
                                  # seeing where that plane is and how it
                                  # moves, independent of whether
                                  # channel_end_constraint is actually
                                  # holding it rigid. No effect if no duct
                                  # is built.
    'symmetry_x': False,         # only build the +X half of the box (cut
    'symmetry_y': False,         # at the midplane) / +Y half respectively,
                                  # halving FEM element count per axis
                                  # enabled, with a PartialFixedProjective
                                  # Constraint at each cut plane holding
                                  # its points to zero displacement in the
                                  # plane's normal direction -- see
                                  # createScene and the block-count parity
                                  # note on _resolve_geometry. Both are
                                  # valid symmetries of this model (the
                                  # trunk and the X-end channel openings
                                  # are both centered on X; the trunk is
                                  # centered on Y too; gravity/pressure
                                  # don't break either). No Z symmetry
                                  # here (unlike HollowCube): the box is
                                  # clamped only at its bottom, not top
                                  # and bottom, so it wouldn't be valid.
    'symmetry_buffer_blocks': 0,  # simulate this many extra blocks of
                                  # ordinary FEM material past each active
                                  # symmetry plane (0 = cut exactly at the
                                  # plane, the original behaviour). Gives
                                  # the symmetry-constrained row a natural
                                  # elastic neighbour on both sides
                                  # instead of being rigid on one side and
                                  # free on the other, which otherwise
                                  # shows up as a visible kink right at
                                  # the cut -- costs a few extra elements
                                  # per axis enabled, in exchange for a
                                  # smoother transition there. Only
                                  # affects the FEM shell mesh, not the
                                  # visual surfaces or the cavity (both
                                  # still cut exactly at the plane) or
                                  # where the symmetry constraint itself
                                  # sits (still the true plane, unmoved).
    'prevent_symmetry_crossing': True,  # add a one-sided PlaneForceField
                                  # at each X/Y symmetry midplane, so
                                  # points elsewhere in the mesh (not just
                                  # the ones exactly on the plane at rest,
                                  # which the constraint above already
                                  # holds) get pushed back if they deform
                                  # past it -- without this, e.g. negative
                                  # pressure can fold the mesh through the
                                  # plane (a self-collision in reality).
                                  # Independent of symmetry_x/y: those
                                  # only control whether the mesh itself
                                  # is halved to save FEM elements -- the
                                  # midplanes exist geometrically either
                                  # way, so this guards both whether or
                                  # not their element count is halved
                                  # (guarding both sides of the full mesh
                                  # when it isn't).
    'prevent_channel_end_crossing': True,  # add the same kind of one-
                                  # sided PlaneForceField guard at each
                                  # built channel duct's far-end plane
                                  # (see channel_separation_blocks),
                                  # stopping the chamber's own end-wall
                                  # material from bulging outward past
                                  # it under pressure -- without this, a
                                  # large enough bulge could reach past
                                  # the duct ring and interact with it
                                  # physically, feeding spurious force
                                  # into the far-end truss/indicator that
                                  # has nothing to do with the real
                                  # inter-chamber tunnel. Restricted to
                                  # real wall/interior material (rest
                                  # |x| within the box's own true length,
                                  # not the duct's own extension past
                                  # it) -- the duct/tunnel's own nodes at
                                  # that plane are excluded, since
                                  # channel_end_constraint's truss (when
                                  # on) already holds those. No effect if
                                  # no duct is built.
    'mirror_visual_x': True,     # live-mirror the outer-skin/interior-
    'mirror_visual_y': True,     # volume visuals across the X/Y symmetry
                                  # plane respectively (and both together,
                                  # if both are enabled), so the render
                                  # shows the complete deformed shape
                                  # rather than just the simulated
                                  # fraction -- see MirrorController. Each
                                  # only has an effect if its own
                                  # symmetry_* flag is also on;
                                  # independently disabling one here
                                  # leaves that plane un-mirrored
                                  # (open/cut) even if the other is fully
                                  # reconstructed. Purely visual, doesn't
                                  # touch the physics.
    'young_modulus': 1.0e6,      # [Pa]  ~soft silicone rubber (Shore ~30-40A)
    'poisson_ratio': 0.45,       # near-incompressible rubber
    'density': 1100.0,           # [kg/m^3] silicone rubber
    'target_pressure': 1000.0,   # [Pa] gauge pressure the cavity ramps/jumps to
    'ramp_time': 2.0,            # [s] time to reach target_pressure if not instant
    'instant': False,            # apply target_pressure immediately instead
                                  # of ramping towards it
    'gravity_enabled': True,     # apply the -Z 9.81 m/s^2 gravity below;
                                  # off gives free-floating [0,0,0] gravity
                                  # (useful to isolate inflation-only
                                  # behaviour from the RestShapeSprings
                                  # base clamp fighting sag)
    'cutaway': True,             # omit CUTAWAY_FACE from the outer skin so
                                  # you can see into the cavity
    'interior_cutaway': True,    # same, but for the interior-volume visual
                                  # surface (same face as `cutaway`). Purely
                                  # visual -- the closed surface used for
                                  # the actual pressure/volume physics is
                                  # unaffected either way.
    'wall_alpha': 0.4,           # opacity of the blue outer-shell visual,
                                  # 0 (invisible) .. 1 (opaque)
    'interior_alpha': 0.5,       # opacity of the orange interior-volume
                                  # visual, 0 (invisible) .. 1 (opaque)
    'show_pressure_overlay': True,  # SurfacePressureConstraint's own solid
                                     # red(inflating)/green(idle) cavity-
                                     # surface indicator. No alpha control
                                     # is possible for this one -- its draw
                                     # code takes raw RGB with no alpha
                                     # parameter at all (SurfacePressureModel
                                     # ::draw(), confirmed by reading the
                                     # source) -- on/off is all there is.
    'show_fem_elements': False,  # VisualStyle's showForceFields flag --
                                  # draws the FEM shell's own tetrahedra
                                  # (wireframe-ish, hard-opaque regardless
                                  # of wall_alpha, see the note in
                                  # createScene). Set here rather than
                                  # toggled by hand in the SOFA GUI's
                                  # display-flags menu because Reload
                                  # resets those flags back to whatever
                                  # this scene sets on build.
}


def load_params(path=PARAMS_FILE):
    params = dict(_DEFAULT_PARAMS)
    if os.path.exists(path):
        try:
            with open(path, 'r') as f:
                loaded = json.load(f)
            params.update({k: v for k, v in loaded.items() if k in params})
        except (OSError, ValueError) as e:
            print(f"[params] could not read {path} ({e}); using defaults")
    else:
        try:
            with open(path, 'w') as f:
                json.dump(params, f, indent=2)
        except OSError as e:
            print(f"[params] could not create {path} ({e}); using defaults")
    return params


PARAMS = load_params()

_EDITOR_PID_FILE = os.path.join(_SCRIPT_DIR, '.params_editor.pid')


def _pid_is_running(pid):
    """Windows-only PID liveness check via `tasklist` (stdlib-only, no
    psutil dependency)."""
    try:
        output = subprocess.check_output(
            ['tasklist', '/FI', f'PID eq {pid}'],
            stderr=subprocess.DEVNULL, text=True)
        return str(pid) in output
    except (OSError, subprocess.SubprocessError):
        return False


def launch_params_editor():
    """Opens params_editor.py in its own process (a plain `python`, not
    runSofa's embedded interpreter -- inside that, sys.executable points
    at runSofa.exe itself, which would try to load the editor script as
    a SOFA scene rather than run it). Non-blocking.

    Guarded against spawning duplicate windows via a PID file on disk
    rather than an in-memory flag: the SOFA GUI's Reload button re-
    imports this whole module from scratch (so that code edits actually
    take effect), which would reset any plain module-level variable back
    to its initial value on every reload, defeating an in-memory guard.

    Set the BETTERFINGER_NO_EDITOR environment variable to skip this
    (used for headless/automated runs so they don't pop up a stray
    window).
    """
    if os.environ.get('BETTERFINGER_NO_EDITOR'):
        return

    if os.path.exists(_EDITOR_PID_FILE):
        try:
            with open(_EDITOR_PID_FILE, 'r') as f:
                old_pid = int(f.read().strip())
        except (OSError, ValueError):
            old_pid = None
        if old_pid is not None and _pid_is_running(old_pid):
            return  # editor from a previous (re)load is still open

    editor_path = os.path.join(_SCRIPT_DIR, 'params_editor.py')
    try:
        # stdio must be detached: inheriting runSofa's handles means
        # anything reading its stdout (a pipe, a log redirect, ...)
        # would block until this GUI window is closed, since it'd hold
        # that pipe open too.
        process = subprocess.Popen(
            ['python', editor_path],
            stdin=subprocess.DEVNULL, stdout=subprocess.DEVNULL, stderr=subprocess.DEVNULL,
            close_fds=True)
        with open(_EDITOR_PID_FILE, 'w') as f:
            f.write(str(process.pid))
    except OSError as e:
        print(f"[params] could not launch params_editor.py: {e}")


def _resolve_trunk_axis(divs, trunk_blocks, allow_zero=False):
    """Snaps a requested trunk footprint (in blocks, along one axis) to a
    value that's centered and grid-aligned: since the box's own centre
    sits exactly on a grid point when `divs` is even, and exactly midway
    between two grid points when `divs` is odd, a symmetric trunk span
    only lands on grid points if its own block count has the same parity
    as `divs`. Clamped to [1 or 2, divs] (never bigger than the box
    itself), rounding up to the nearest valid value when the request is
    in between.

    `allow_zero`: 0 is kept as 0 (no trunk of its own along this axis) --
    only valid when something else is attached, see ATTACH_* (the
    symmetry buffer's floor).
    """
    if allow_zero and int(round(trunk_blocks)) <= 0:
        return 0
    trunk = max(1, int(round(trunk_blocks)))
    trunk = min(trunk, divs)
    if trunk % 2 != divs % 2:
        trunk = trunk + 1 if trunk < divs else trunk - 1
    return trunk


def _resolve_geometry(block_size, length_blocks, width_blocks, height_blocks,
                       wall_length_blocks, wall_width_blocks, wall_height_blocks,
                       trunk_length_blocks, trunk_width_blocks,
                       symmetry_x=False, symmetry_y=False, symmetry_buffer_blocks=0):
    """Snaps the block counts to an achievable structured-grid geometry
    (each axis needs at least one interior/cavity cell) instead of
    requiring the caller to get it right -- params.json is meant to be
    hand-edited (or edited via params_editor.py), so this has to tolerate
    arbitrary reasonable input rather than asserting.

    An axis with symmetry enabled is additionally rounded up to an even
    block count, so its midplane -- where the model gets cut in half --
    always falls exactly on a grid boundary instead of through the
    middle of a block.
    """
    cell = block_size * 1e-3  # mm -> m

    def resolve_axis(extent_blocks, wall_blocks, symmetric):
        divs = max(1, int(round(extent_blocks)))
        wall = max(1, int(round(wall_blocks)))
        min_divs = 2 * wall + 1  # need at least 1 interior (cavity) cell
        divs = max(divs, min_divs)
        if symmetric:
            divs += divs % 2  # round up to even
        return divs, wall

    divs_x, wall_x = resolve_axis(length_blocks, wall_length_blocks, symmetry_x)
    divs_y, wall_y = resolve_axis(width_blocks, wall_width_blocks, symmetry_y)
    divs_z, wall_z = resolve_axis(height_blocks, wall_height_blocks, False)
    # A zero trunk length is allowed when X symmetry has a buffer: the
    # buffer's floor blocks are then all that's attached (see ATTACH_*).
    trunk_divs_x = _resolve_trunk_axis(divs_x, trunk_length_blocks,
                                       allow_zero=symmetry_x and int(round(symmetry_buffer_blocks)) > 0)
    trunk_divs_y = _resolve_trunk_axis(divs_y, trunk_width_blocks)
    return cell, divs_x, divs_y, divs_z, wall_x, wall_y, wall_z, trunk_divs_x, trunk_divs_y


SYMMETRY_X = PARAMS['symmetry_x']
SYMMETRY_Y = PARAMS['symmetry_y']
SYMMETRY_BUFFER_BLOCKS = PARAMS['symmetry_buffer_blocks']
PREVENT_SYMMETRY_CROSSING = PARAMS['prevent_symmetry_crossing']
PREVENT_CHANNEL_END_CROSSING = PARAMS['prevent_channel_end_crossing']
MIRROR_VISUAL_X = PARAMS['mirror_visual_x']
MIRROR_VISUAL_Y = PARAMS['mirror_visual_y']
CHANNEL_HEIGHT_BLOCKS = PARAMS['channel_height_blocks']
CHANNEL_SEPARATION_BLOCKS = PARAMS['channel_separation_blocks']
CHANNEL_END_CONSTRAINT = PARAMS['channel_end_constraint']
CHANNEL_END_ALPHA = PARAMS['channel_end_alpha']

CELL, DIVS_X, DIVS_Y, DIVS_Z, WALL_X, WALL_Y, WALL_Z, TRUNK_DIVS_X, TRUNK_DIVS_Y = _resolve_geometry(
    PARAMS['block_size'], PARAMS['length_blocks'], PARAMS['width_blocks'], PARAMS['height_blocks'],
    PARAMS['wall_length_blocks'], PARAMS['wall_width_blocks'], PARAMS['wall_height_blocks'],
    PARAMS['trunk_length_blocks'], PARAMS['trunk_width_blocks'],
    SYMMETRY_X, SYMMETRY_Y, SYMMETRY_BUFFER_BLOCKS)

LENGTH = DIVS_X * CELL  # [m] outer box extent along X
WIDTH = DIVS_Y * CELL   # [m] outer box extent along Y
HEIGHT = DIVS_Z * CELL  # [m] outer box extent along Z (vertical)

FLOOR_SIZE = PARAMS['floor_size_blocks'] * CELL  # [m] edge length of the
                                                  # square green floor

BASE_OFFSET = CELL  # [m] the hollow box is raised this far above the floor
                     # (one elementary block), leaving room for the "trunk"
                     # visual below it -- see ATTACH_* and createScene().

# Footprint (in the box's local X/Y, before centring) of the part of the
# bottom face attached to fixed world, visualized by the trunk between the
# floor and the box -- TRUNK_DIVS_X/TRUNK_DIVS_Y blocks, centered. The
# BoxROI clamp and the trunk mesh both derive from these same bounds, so
# they can't drift out of sync. With a symmetry flag on, clipped to where
# the model is built: X>=0 / Y>=0, plus the symmetry buffer's blocks past
# the cut (see build_hollow_cube_mesh), whose floor is always attached --
# that material stands in for the trunk-mounted floor on the far side of
# the cut. With X symmetry and a buffer, the trunk length may even be 0:
# the buffer's floor is then the whole attachment.
ATTACH_XMIN, ATTACH_XMAX = -TRUNK_DIVS_X * CELL / 2, TRUNK_DIVS_X * CELL / 2
ATTACH_YMIN, ATTACH_YMAX = -TRUNK_DIVS_Y * CELL / 2, TRUNK_DIVS_Y * CELL / 2
_BUFFER = max(0, int(round(SYMMETRY_BUFFER_BLOCKS)))
if SYMMETRY_X:
    ATTACH_XMIN = -min(_BUFFER, DIVS_X // 2) * CELL
if SYMMETRY_Y:
    ATTACH_YMIN = -min(_BUFFER, DIVS_Y // 2) * CELL

YOUNG_MODULUS = PARAMS['young_modulus']
POISSON_RATIO = PARAMS['poisson_ratio']
DENSITY = PARAMS['density']

TARGET_PRESSURE = PARAMS['target_pressure']
RAMP_TIME = PARAMS['ramp_time']
INSTANT = PARAMS['instant']

GRAVITY = [0.0, 0.0, -9.81] if PARAMS['gravity_enabled'] else [0.0, 0.0, 0.0]
DT = 0.01

CAMERA_DISTANCE_FACTOR = 2.741  # distance from the box's centre to the camera,
                                 # as a multiple of its largest dimension
CAMERA_DISTANCE = CAMERA_DISTANCE_FACTOR * max(LENGTH, WIDTH, HEIGHT)  # [m]

CUTAWAY_FACE = '-Y'       # which outer/interior face the cutout window opens
                           # in, when `cutaway`/`interior_cutaway` is true in
                           # params.json ('-Y' faces the camera). Names:
                           # '+X','-X','+Y','-Y','+Z','-Z'.
CUTAWAY_FACES = {CUTAWAY_FACE} if PARAMS['cutaway'] else set()
INTERIOR_CUTAWAY_FACES = {CUTAWAY_FACE} if PARAMS['interior_cutaway'] else set()

WALL_ALPHA = PARAMS['wall_alpha']
INTERIOR_ALPHA = PARAMS['interior_alpha']
SHOW_PRESSURE_OVERLAY = PARAMS['show_pressure_overlay']
SHOW_FEM_ELEMENTS = PARAMS['show_fem_elements']


# ----------------------------------------------------------------------
# Procedural mesh generation
# ----------------------------------------------------------------------
# Each face maps its two tangential (a, b) loop indices to a (i, j, k)
# grid coordinate, plus which of divs_x/divs_y/divs_z each of a/b ranges
# over -- e.g. '+X'/'-X' are spanned by Y and Z, so a loop 0..divs_y and
# b loops 0..divs_z.
_BOX_FACES = {
    '+X': (lambda a, b, dx, dy, dz: (dx, a, b), False, 'y', 'z'),
    '-X': (lambda a, b, dx, dy, dz: (0, a, b), True, 'y', 'z'),
    '+Y': (lambda a, b, dx, dy, dz: (a, dy, b), True, 'x', 'z'),
    '-Y': (lambda a, b, dx, dy, dz: (a, 0, b), False, 'x', 'z'),
    '+Z': (lambda a, b, dx, dy, dz: (a, b, dz), False, 'x', 'y'),
    '-Z': (lambda a, b, dx, dy, dz: (a, b, 0), True, 'x', 'y'),
}


def _box_surface(xmin, ymin, zmin, xmax, ymax, zmax, divs_x, divs_y, divs_z,
                  skip_faces=(), face_windows=None):
    """Axis-aligned box surface mesh with outward normals, `divs_x`/
    `divs_y`/`divs_z` quads per edge along X/Y/Z respectively (so all-1
    gives the original 8-vertex, 12-triangle box). Points are shared
    across adjacent faces (no seam duplicates), and each face's own grid
    points are generated in the same left-to-right, bottom-to-top order
    the shell mesh uses, so with matching divs they land exactly on the
    shell's inner boundary nodes instead of just the 8 corners.

    `skip_faces`: names from {'+X','-X','+Y','-Y','+Z','-Z'} to omit
    entirely -- e.g. for a cutaway view that lets you see inside the box.

    `face_windows`: {face_name: (a_lo, a_hi, b_lo, b_hi)} to instead
    punch a rectangular hole out of part of a (non-skipped) face -- quads
    whose (a, b) cell falls in that range are omitted, everything else on
    the face is generated as usual. `a`/`b` are that face's own two
    in-plane axes (see `_BOX_FACES`), in the same cell-index units as
    `divs_a`/`divs_b`. Used for the PneuNet chamber-connector openings.
    """
    point_index = {}
    points = []

    def get_point(i, j, k):
        key = (i, j, k)
        idx = point_index.get(key)
        if idx is None:
            idx = len(points)
            point_index[key] = idx
            points.append([
                xmin + (xmax - xmin) * i / divs_x,
                ymin + (ymax - ymin) * j / divs_y,
                zmin + (zmax - zmin) * k / divs_z,
            ])
        return idx

    tris = []
    axis_divs = {'x': divs_x, 'y': divs_y, 'z': divs_z}

    def add_face(ijk_of, flip, divs_a, divs_b, window):
        win_a_lo, win_a_hi, win_b_lo, win_b_hi = window if window else (0, 0, 0, 0)
        for a in range(divs_a):
            for b in range(divs_b):
                if window and win_a_lo <= a < win_a_hi and win_b_lo <= b < win_b_hi:
                    continue
                p00 = get_point(*ijk_of(a, b, divs_x, divs_y, divs_z))
                p10 = get_point(*ijk_of(a + 1, b, divs_x, divs_y, divs_z))
                p11 = get_point(*ijk_of(a + 1, b + 1, divs_x, divs_y, divs_z))
                p01 = get_point(*ijk_of(a, b + 1, divs_x, divs_y, divs_z))
                if not flip:
                    tris.append([p00, p10, p11])
                    tris.append([p00, p11, p01])
                else:
                    tris.append([p00, p01, p11])
                    tris.append([p00, p11, p10])

    for name, (ijk_of, flip, axis_a, axis_b) in _BOX_FACES.items():
        if name not in skip_faces:
            window = face_windows.get(name) if face_windows else None
            add_face(ijk_of, flip, axis_divs[axis_a], axis_divs[axis_b], window)

    return points, tris


def _keep_loop_points(loop_ab, divs_a, divs_b, to_world, keep_point):
    """Drops the loop points `keep_point` rejects, except the 4 corners --
    see `_capped_box_surface`'s `keep_point`. The loop stays the same
    rectangle (only collinear edge points go), so the cap's shape and
    enclosed volume don't change."""
    if keep_point is None:
        return loop_ab
    corners = {(0, 0), (divs_a, 0), (divs_a, divs_b), (0, divs_b)}
    return [ab for ab in loop_ab if ab in corners or keep_point(to_world(ab))]


def _fan_cap_face(face_name, xmin, ymin, zmin, xmax, ymax, zmax, divs_x, divs_y, divs_z,
                  keep_point=None):
    """Closes one `_BOX_FACES` face with a fan triangulation of only its
    own boundary loop (at the face's full a/b resolution, i.e. the same
    resolution `_box_surface` would use there) -- no interior points are
    invented. Every returned point duplicates a point on the loop that
    `_box_surface` already places on one of the box's OTHER (adjacent,
    still-built) faces, so -- unlike a point genuinely inside the face --
    it coincides exactly with real material there; see
    `_capped_box_surface`'s docstring for why that matters.
    """
    ijk_of, flip, axis_a, axis_b = _BOX_FACES[face_name]
    axis_divs = {'x': divs_x, 'y': divs_y, 'z': divs_z}
    divs_a, divs_b = axis_divs[axis_a], axis_divs[axis_b]

    def world(i, j, k):
        return [xmin + (xmax - xmin) * i / divs_x,
                ymin + (ymax - ymin) * j / divs_y,
                zmin + (zmax - zmin) * k / divs_z]

    # Walk the perimeter once (each corner visited exactly once): bottom
    # edge left-to-right, right edge bottom-to-top, top edge right-to-
    # left, left edge top-to-bottom.
    loop_ab = ([(a, 0) for a in range(divs_a)] +
               [(divs_a, b) for b in range(divs_b)] +
               [(a, divs_b) for a in range(divs_a, 0, -1)] +
               [(0, b) for b in range(divs_b, 0, -1)])
    if flip:
        loop_ab.reverse()  # match _box_surface's own winding for this face
    loop_ab = _keep_loop_points(loop_ab, divs_a, divs_b,
                                lambda ab: world(*ijk_of(ab[0], ab[1], divs_x, divs_y, divs_z)), keep_point)

    points = [world(*ijk_of(a, b, divs_x, divs_y, divs_z)) for a, b in loop_ab]
    tris = [[0, i, i + 1] for i in range(1, len(points) - 1)]
    return points, tris


def _fan_cap_window(face_name, xmin, ymin, zmin, xmax, ymax, zmax, divs_x, divs_y, divs_z, window,
                    keep_point=None):
    """Like `_fan_cap_face`, but caps only a rectangular sub-window
    `(a_lo, a_hi, b_lo, b_hi)` of one face (the same window passed to
    `_box_surface`'s `face_windows` to punch a hole there) instead of
    the whole face -- the window's own perimeter, at the surrounding
    fine grid's own resolution, coincides exactly with real points
    `_box_surface` already placed just outside the window on the SAME
    face, for the same reason `_fan_cap_face`'s whole-face loop does.
    Used for the PneuNet channel opening: unlike a symmetry cut, most of
    that face is real, pressure-mappable wall -- only the small window
    itself needs a cap, not the entire face (see `_capped_box_surface`).
    """
    ijk_of, flip, axis_a, axis_b = _BOX_FACES[face_name]

    def world(i, j, k):
        return [xmin + (xmax - xmin) * i / divs_x,
                ymin + (ymax - ymin) * j / divs_y,
                zmin + (zmax - zmin) * k / divs_z]

    a_lo, a_hi, b_lo, b_hi = window
    loop_ab = ([(a, b_lo) for a in range(a_lo, a_hi)] +
               [(a_hi, b) for b in range(b_lo, b_hi)] +
               [(a, b_hi) for a in range(a_hi, a_lo, -1)] +
               [(a_lo, b) for b in range(b_hi, b_lo, -1)])
    if flip:
        loop_ab.reverse()
    if keep_point is not None:
        corners = {(a_lo, b_lo), (a_hi, b_lo), (a_hi, b_hi), (a_lo, b_hi)}
        loop_ab = [ab for ab in loop_ab
                   if ab in corners or keep_point(world(*ijk_of(ab[0], ab[1], divs_x, divs_y, divs_z)))]

    points = [world(*ijk_of(a, b, divs_x, divs_y, divs_z)) for a, b in loop_ab]
    tris = [[0, i, i + 1] for i in range(1, len(points) - 1)]
    return points, tris


def _capped_box_surface(xmin, ymin, zmin, xmax, ymax, zmax, divs_x, divs_y, divs_z,
                         coarse_faces=(), skip_faces=(), face_windows=None, cap_windows=True,
                         keep_point=None):
    """Like `_box_surface`, but any face named in `coarse_faces` is
    closed with `_fan_cap_face` (using only its own boundary-loop
    points) instead of being subdivided into a full interior grid.

    This exists for a symmetry cut face on the cavity surface: points on
    its boundary loop coincide exactly with real shell vertices (mapped
    correctly by BarycentricMapping and held on the plane by the
    symmetry boundary condition), but a fully subdivided cap's *interior*
    points generally don't -- there's no shell material there, only the
    hollow interior -- so BarycentricMapping has nothing valid to
    interpolate them from and they drift off the cut plane as the
    simulation runs. Fan-capping from the boundary loop alone sidesteps
    the problem entirely: the enclosed-volume computation only depends
    on a flat cap's boundary shape, not on how (or whether) its interior
    is subdivided, so nothing is lost by dropping those unmappable
    interior points.

    `face_windows`: like `_box_surface`'s, for a face that should stay
    otherwise fine (unlike `coarse_faces`, which drops the ENTIRE face's
    grid) but has a small hole -- e.g. the PneuNet channel opening, where
    most of the end wall is still real, pressure-mappable material and
    only the opening itself has none. The window's own small perimeter
    gets its own `_fan_cap_window` patch so the surface stays closed,
    while the rest of the face keeps its full resolution.

    `cap_windows=False` leaves a `face_windows` hole genuinely open (like
    `skip_faces`, but for part of a face) instead of capping it -- for
    when the caller is appending its own surface piece to continue the
    boundary seamlessly through that hole instead (e.g. the PneuNet
    channel duct's own bore surface), rather than sealing it here.

    `keep_point(p)`: whether a cap's boundary-loop point `p` lies on real
    shell material. Points it rejects are dropped from the cap outlines
    (a face's corners always stay). That matters where two caps meet
    along an edge with no material at all: with both X and Y symmetry,
    the -X and -Y cut faces share the line x=y=0, which runs straight
    through the hollow cavity. Every intermediate loop point on that
    line has the same unmappable-point problem as a cap's interior.
    BarycentricMapping extrapolates them from the nearest elements and
    applies their share of the pressure load there, which showed up as a
    strong, unphysical bulge of the end wall next to the cut.
    """
    fine_skip = set(coarse_faces) | set(skip_faces)
    points, tris = _box_surface(xmin, ymin, zmin, xmax, ymax, zmax,
                                 divs_x, divs_y, divs_z, skip_faces=fine_skip,
                                 face_windows=face_windows)
    for face_name in coarse_faces:
        cap_points, cap_tris = _fan_cap_face(face_name, xmin, ymin, zmin, xmax, ymax, zmax,
                                              divs_x, divs_y, divs_z, keep_point=keep_point)
        offset = len(points)
        points = points + cap_points
        tris = tris + [[i + offset for i in t] for t in cap_tris]
    for face_name, window in ((face_windows or {}).items() if cap_windows else ()):
        if face_name in fine_skip:
            continue  # already whole-face capped/omitted above
        cap_points, cap_tris = _fan_cap_window(face_name, xmin, ymin, zmin, xmax, ymax, zmax,
                                                divs_x, divs_y, divs_z, window, keep_point=keep_point)
        offset = len(points)
        points = points + cap_points
        tris = tris + [[i + offset for i in t] for t in cap_tris]
    return points, tris


def _mirror_surface(points, tris, axes, mirror_values):
    """Rest-pose mirror of a (points, tris) surface across one or more
    axis-aligned planes (`axes[i]`'s coordinate reflected about
    `mirror_values[i]`) -- the initial shape for a mirror_visual copy
    (see createScene): there's no real shell material on the mirrored
    side to map its LIVE position from (same reason the cavity's
    symmetry cap needed _capped_box_surface), so its per-frame position
    is instead driven directly by MirrorController, reflecting the real
    surface's current position the same way each step. Triangle winding
    is reversed for an odd number of axes and kept as-is for an even
    number, so outward normals stay correct after reflection.
    """
    mirrored = []
    for p in points:
        q = list(p)
        for axis, value in zip(axes, mirror_values):
            q[axis] = 2 * value - q[axis]
        mirrored.append(q)
    if len(axes) % 2 == 1:
        tris = [[t[0], t[2], t[1]] for t in tris]
    else:
        tris = [list(t) for t in tris]
    return mirrored, tris


def _flat_shaded(points, tris):
    """Duplicates each triangle's own 3 vertices so none are shared with
    a neighboring triangle. SOFA's OglModel always computes smooth,
    per-vertex-averaged normals with no flat-shading override (checked:
    neither OglModel nor its VisualModelImpl base declares any such
    Data field in this SOFA version) -- but with no shared vertices left
    to average across, each vertex's "averaged" normal degenerates to
    exactly its one triangle's own flat face normal, giving the same
    visual result. Applied to every visible (rendered) surface so sharp
    edges/corners stay crisp instead of smoothed over; never applied to
    the cavity surface, which is purely physics (SurfacePressureConstraint)
    and never rendered at all.
    """
    flat_points = []
    flat_tris = []
    for tri in tris:
        base = len(flat_points)
        for i in tri:
            flat_points.append(points[i])
        flat_tris.append([base, base + 1, base + 2])
    return flat_points, flat_tris


def _vec_sub(a, b):
    return [a[i] - b[i] for i in range(3)]


def _vec_cross(a, b):
    return [a[1] * b[2] - a[2] * b[1],
            a[2] * b[0] - a[0] * b[2],
            a[0] * b[1] - a[1] * b[0]]


def _vec_normalize(v):
    n = math.sqrt(sum(c * c for c in v))
    return [c / n for c in v]


def _plane_basis(a, b, c):
    """Orthonormal (origin, u, v, n) frame for the plane through 3
    points -- `n` is the plane's true normal (from the anchor
    triangle's own cross product); `u`/`v` are instead aligned to world
    Y/Z as closely as the plane allows (world Y projected onto the
    plane and normalized, then `v` completed via n x u) rather than
    following the anchor triangle's own arbitrary (diagonal) winding --
    purely so an axis-aligned rest rectangle renders axis-aligned
    instead of appearing rotated; doesn't affect flatness, which only
    depends on `n`, not on which in-plane basis is chosen. Used by
    EndPlaneController and its matching rest-pose setup in createScene.
    """
    origin = [(a[k] + b[k] + c[k]) / 3.0 for k in range(3)]
    u_diag = _vec_normalize(_vec_sub(b, a))
    n = _vec_normalize(_vec_cross(u_diag, _vec_sub(c, a)))
    world_y = [0.0, 1.0, 0.0]
    proj = sum(world_y[k] * n[k] for k in range(3))
    u = _vec_normalize([world_y[k] - proj * n[k] for k in range(3)])
    v = _vec_cross(n, u)
    return origin, u, v, n


def _flat_rect_grid(y0, y1, z0, z1, cell):
    """Builds a flat, axis-aligned grid of `cell`-sized quads (2
    triangles each) at local x=0, spanning y0..y1 and z0..z1 -- the
    caller places it in world space (translates/reorients it) itself.
    `y1 - y0` and `z1 - z0` are expected to already be whole multiples
    of `cell` (true for the channel end-plane indicator's enlarged
    bounds, see createScene), so every quad comes out exactly
    `cell`-sized; rounds to the nearest whole count either way rather
    than asserting, since params.json is meant to be hand-edited.
    """
    divs_y = max(1, round((y1 - y0) / cell))
    divs_z = max(1, round((z1 - z0) / cell))

    points = []
    for j in range(divs_y + 1):
        for k in range(divs_z + 1):
            points.append([0.0, y0 + (y1 - y0) * j / divs_y, z0 + (z1 - z0) * k / divs_z])

    def idx(j, k):
        return j * (divs_z + 1) + k

    tris = []
    for j in range(divs_y):
        for k in range(divs_z):
            p00, p10, p11, p01 = idx(j, k), idx(j + 1, k), idx(j + 1, k + 1), idx(j, k + 1)
            tris.append([p00, p10, p11])
            tris.append([p00, p11, p01])
    return points, tris


def _build_axis_arrow(axis, shaft_len, head_len, shaft_half, head_half):
    """Builds a simple arrow mesh (a box shaft plus a 4-sided pyramid
    head) starting at the origin and pointing along the given world axis
    -- for the static X/Y direction indicators added in createScene().
    `axis`: 0 for +X, 1 for +Y. The shaft's own end cap (facing the tip)
    is left out -- since `head_half` > `shaft_half`, the pyramid's base
    already fully covers that opening, and including both would leave two
    coincident, overlapping quads there (z-fighting, as elsewhere in this
    file).
    """
    if axis == 0:
        pts, tris = _box_surface(0.0, -shaft_half, -shaft_half,
                                  shaft_len, shaft_half, shaft_half, 1, 1, 1,
                                  skip_faces={'+X'})
        base = [[shaft_len, -head_half, -head_half],
                [shaft_len,  head_half, -head_half],
                [shaft_len,  head_half,  head_half],
                [shaft_len, -head_half,  head_half]]
        tip = [shaft_len + head_len, 0.0, 0.0]
    elif axis == 1:
        pts, tris = _box_surface(-shaft_half, 0.0, -shaft_half,
                                  shaft_half, shaft_len, shaft_half, 1, 1, 1,
                                  skip_faces={'+Y'})
        base = [[-head_half, shaft_len, -head_half],
                [ head_half, shaft_len, -head_half],
                [ head_half, shaft_len,  head_half],
                [-head_half, shaft_len,  head_half]]
        tip = [0.0, shaft_len + head_len, 0.0]
    else:
        raise ValueError("axis must be 0 (X) or 1 (Y)")

    base_start = len(pts)
    pts = pts + base + [tip]
    b0, b1, b2, b3, t = (base_start, base_start + 1, base_start + 2,
                          base_start + 3, base_start + 4)
    tris = tris + [
        [b0, b1, t], [b1, b2, t], [b2, b3, t], [b3, b0, t],  # 4 pyramid sides
        [b0, b2, b1], [b0, b3, b2],                          # base cap
    ]
    return pts, tris


def _diagonal_stroke_box(x0, y0, x1, y1, half_width, z0, z1):
    """Builds a rectangular prism (8 corners, 12 triangles) for a single
    straight stroke of a letter glyph: runs from (x0, y0) to (x1, y1) in
    the world XY plane with the given half-width perpendicular to that
    run (in-plane), extruded vertically from z0 to z1. Needed because the
    X/Y axis-label letters below have diagonal strokes, which
    `_box_surface` (axis-aligned only) can't build directly.

    Reuses `_box_surface`'s own canonical unit box (correct winding
    already) and remaps its points into the stroke's own (along the run,
    across the run, up) frame -- that frame has the same handedness as
    world XYZ by construction (the "across" direction is the "along"
    direction rotated +90 degrees in-plane), so the remapped winding
    stays outward-correct too.
    """
    dx, dy = x1 - x0, y1 - y0
    length = math.hypot(dx, dy)
    ux, uy = dx / length, dy / length  # unit vector along the run
    nx, ny = -uy, ux                   # unit vector across the run (in-plane)

    unit_pts, tris = _box_surface(0.0, 0.0, 0.0, 1.0, 1.0, 1.0, 1, 1, 1)
    pts = []
    for u, v, w in unit_pts:
        along, side = u, 2 * v - 1
        pts.append([
            x0 + along * dx + side * half_width * nx,
            y0 + along * dy + side * half_width * ny,
            z0 + w * (z1 - z0),
        ])
    return pts, tris


def _build_letter_glyph(strokes, stroke_half, z0, z1):
    """Builds a simple flat 3D "glyph" out of straight strokes (each its
    own closed prism from `_diagonal_stroke_box`, not welded to the
    others -- fine for a purely visual, non-simulated shape, same
    approach as the arrow shaft/head above). `strokes`: list of
    (x0, y0, x1, y1) stroke centerlines in world XY. Used for the big
    X/Y axis-label letters in createScene().
    """
    pts, tris = [], []
    for x0, y0, x1, y1 in strokes:
        stroke_pts, stroke_tris = _diagonal_stroke_box(x0, y0, x1, y1, stroke_half, z0, z1)
        offset = len(pts)
        pts += stroke_pts
        tris += [[i + offset for i in t] for t in stroke_tris]
    return pts, tris


def _letter_x_strokes(cx, cy, half_size):
    """Two crossing diagonal strokes forming a letter X, centered at
    (cx, cy) in world XY, spanning +-half_size."""
    return [
        (cx - half_size, cy - half_size, cx + half_size, cy + half_size),
        (cx - half_size, cy + half_size, cx + half_size, cy - half_size),
    ]


def _letter_y_strokes(cx, cy, half_size):
    """Two upper arms meeting at the centre plus a stem down to the
    bottom, forming a letter Y, centered at (cx, cy) in world XY,
    spanning +-half_size."""
    return [
        (cx - half_size, cy + half_size, cx, cy),
        (cx + half_size, cy + half_size, cx, cy),
        (cx, cy, cx, cy - half_size),
    ]


# Kuhn (body-diagonal) decomposition of a hexahedron into 6 tetrahedra,
# expressed as local corner indices 0..7 in the order:
#   0=(0,0,0) 1=(1,0,0) 2=(1,1,0) 3=(0,1,0) 4=(0,0,1) 5=(1,0,1) 6=(1,1,1) 7=(0,1,1)
# Every hexahedron in the structured grid uses this same local-corner
# template (never a reflected/rotated one), which guarantees the diagonal
# chosen on any face shared by two neighbouring hexahedra agrees from both
# sides -- so the resulting tet mesh is conforming (no cracks/overlaps).
_KUHN_TETS = [
    (0, 1, 2, 6),
    (0, 2, 3, 6),
    (0, 3, 7, 6),
    (0, 7, 4, 6),
    (0, 4, 5, 6),
    (0, 5, 1, 6),
]


def _symmetric_axis_bounds(lo, hi, divs, symmetric, keep_lower_half):
    """Clips (lo, hi) and its cell count `divs` to one half about their
    own midpoint when `symmetric` is set -- `keep_lower_half` selects
    whether the kept half is [lo, mid] or [mid, hi]. `divs` must be even
    when `symmetric` (guaranteed by _resolve_geometry's rounding) so the
    cut lands exactly on a grid boundary rather than through a block.
    Used to clip both the shell mesh's own per-axis cell range and the
    cavity/outer-skin box bounds passed to _box_surface, at each active
    symmetry plane, in build_hollow_cube_mesh below.
    """
    if not symmetric:
        return lo, hi, divs
    mid = (lo + hi) / 2.0
    half_divs = divs // 2
    return (lo, mid, half_divs) if keep_lower_half else (mid, hi, half_divs)


def build_hollow_cube_mesh(divs_x=DIVS_X, divs_y=DIVS_Y, divs_z=DIVS_Z,
                            wall_x=WALL_X, wall_y=WALL_Y, wall_z=WALL_Z, cell=CELL,
                            z_offset=0.0,
                            symmetry_x=False, symmetry_y=False,
                            symmetry_buffer_blocks=0, channel_height_blocks=0,
                            channel_separation_blocks=0.0,
                            outer_skip_faces=(), inner_skip_faces=()):
    """Builds a tetrahedral shell mesh of a hollow box out of cube-shaped
    blocks of edge length `cell`, plus the triangulated inner-cavity
    surface used for the pressure load, plus the outer skin and
    interior-volume surfaces used for visualization.

    The box spans `divs_x`/`divs_y`/`divs_z` blocks along X/Y/Z, with its
    bottom face at world Z=`z_offset` (0 sits it directly on the floor).
    The shell is `wall_x` blocks thick on the +-X faces, `wall_y` on +-Y,
    `wall_z` on +-Z (top/bottom); the interior
    (divs_x - 2*wall_x) x (divs_y - 2*wall_y) x (divs_z - 2*wall_z) blocks
    are left unmeshed and form the air cavity. Each shell grid cell is
    split into 6 tetrahedra (Kuhn triangulation). Grid points that aren't
    a corner of any shell cell (the free-floating interior of the cavity)
    are dropped so the FEM mesh has no unused DOFs.

    `symmetry_x`/`symmetry_y`: when set, only the +X/+Y half of the box
    is built (cut at its own midplane -- `divs_x` etc. must be even, see
    _resolve_geometry), roughly halving the element count per axis
    enabled. The cavity/outer-skin/interior-visual boxes are clipped to
    the same half, so the cavity surface stays closed (needed for
    SurfacePressureConstraint's volume computation) with a real face
    exactly at the cut instead of a gap. The caller is responsible for
    adding the actual symmetry boundary condition (fixing displacement
    normal to each cut plane) -- this function only builds the reduced
    geometry.

    `symmetry_buffer_blocks`: extends the *shell FEM mesh only* (not the
    cavity/outer/inner visual surfaces, which stay cut exactly at the
    plane) this many extra blocks past each active symmetry plane, as
    ordinary, freely-deforming material -- no special treatment, since
    the wall pattern is already mirror-symmetric about the cut by
    construction. This gives the symmetry-constrained row a natural
    elastic neighbour on both sides (matching what it would see in the
    unreduced model) instead of being rigid on one side and free on the
    other, which otherwise shows up as a visible kink right at the cut.
    The buffer's own far edge is left unconstrained/free; that's a much
    smaller, more localized artifact that decays with distance from the
    plane. 0 (default) reproduces the original exact-cut behaviour.

    `channel_height_blocks`: carves a connecting-channel opening through
    both the -X and +X end walls, spanning the full width of the air
    cavity and this many blocks tall starting at the cavity floor --
    representing the base channel a real multi-chamber PneuNet finger
    uses to connect this chamber to its neighbors'. Clamped to the
    cavity's own interior height. The shell FEM mesh genuinely has no
    material there (a real hole). The cavity surface used for
    SurfacePressureConstraint stays at full resolution everywhere else on
    those faces (so pressure still loads the real end-wall material
    above/around the opening properly) and only caps the small opening
    itself (via `_capped_box_surface`'s `face_windows`) so the surface
    stays closed for the volume computation -- unlike a symmetry cut,
    which coarsens the ENTIRE face, since here most of the face is still
    real material, not a cut through the middle of the model. The
    outer-skin/interior-volume *visual* surfaces show the same real
    opening (a rectangular hole in an otherwise-solid end face) via
    `_box_surface`'s `face_windows` directly (no cap -- purely visual).
    0 (default) disables it -- fully closed end walls, like HollowCube.

    `channel_separation_blocks`: half of this (may be a fraction of a
    block) is built as an actual hollow FEM duct extending past each end
    wall's channel opening -- same bore cross-section (full cavity width x
    channel_height_blocks), walled the same way (wall_y-thick sides,
    wall_z-thick top/bottom), structurally welded onto the shell mesh at
    its inner end. Subdivided into `duct_divs_x` layers along X so no
    single element's X-edge exceeds one block (a single half_sep-long
    layer produced badly elongated, ill-conditioned elements once
    half_sep exceeded about a block) -- the last layer may be shorter
    than the others if half_sep isn't an exact multiple of `cell`. The far end is flat-capped for the cavity surface
    (like a symmetry cut -- unlike the bare-hole case above, this really
    is where the model gets cut, at the true midpoint of the real
    connecting tunnel) and left open for the outer-skin/interior-volume
    visuals (consistent with how those already treat a symmetry cut).
    That far plane is a new symmetry plane a caller can later add a
    PartialFixedProjectiveConstraint at (see the existing symX/symY
    handling in createScene) -- this function only builds the geometry.
    No effect if `channel_height_blocks` is 0, or this is <= 0 (the
    channel opening stays a bare hole with nothing beyond it).

    `outer_skip_faces`/`inner_skip_faces`: passed straight to `_box_surface`
    for the outer skin / interior-volume visual surfaces respectively --
    names from {'+X','-X','+Y','-Y','+Z','-Z'} to leave out, e.g. for a
    cutaway view into the cavity. Purely visual: `cavity_pts`/`cavity_tris`
    (used for the actual pressure load) are always the complete, closed
    surface regardless of `inner_skip_faces` -- an open cavity mesh would
    make the enclosed-volume computation meaningless.

    Returns:
        positions   : list of [x, y, z] shell mesh points
        tetrahedra  : list of 4-index tuples (compact indices into positions)
        cavity_pts  : list of [x, y, z] cavity surface vertices (closed, for
                      SurfacePressureConstraint)
        cavity_tris : list of 3-index tuples (outward-normal triangles)
        outer_pts   : list of [x, y, z] outer skin visual surface vertices
        outer_tris  : list of 3-index tuples (outward-normal triangles)
        inner_pts   : list of [x, y, z] interior-volume visual surface
                      vertices (same geometry as cavity_pts/cavity_tris,
                      but may have `inner_skip_faces` cut away)
        inner_tris  : list of 3-index tuples (outward-normal triangles)
        end_planes  : list of {'side': 'neg'/'pos', 'pts': [...], 'tris':
                      [...]} -- REST-pose geometry of the far-end
                      symmetry-plane indicator for each built duct side
                      (empty list if no duct is built at all), see
                      `channel_separation_blocks` above. createScene
                      turns each into a live, always-exactly-flat visual.
    """
    length, width, height = divs_x * cell, divs_y * cell, divs_z * cell
    nx, ny, nz = divs_x + 1, divs_y + 1, divs_z + 1

    def pidx(i, j, k):
        return (i * ny + j) * nz + k

    raw_positions = []
    for i in range(nx):
        for j in range(ny):
            for k in range(nz):
                raw_positions.append([-length / 2 + i * cell,
                                       -width / 2 + j * cell,
                                       z_offset + k * cell])

    # Symmetry keeps the +X half and the +Y half respectively, each
    # extended by symmetry_buffer_blocks extra cells past the true
    # midplane -- unreferenced points on the discarded side are dropped
    # below, same as the deep cavity interior.
    buf = symmetry_buffer_blocks
    i_lo, i_hi = (max(0, divs_x // 2 - buf), divs_x) if symmetry_x else (0, divs_x)
    j_lo, j_hi = (max(0, divs_y // 2 - buf), divs_y) if symmetry_y else (0, divs_y)
    k_lo, k_hi = 0, divs_z

    # Clamp to the cavity's own interior height -- see this function's
    # docstring for `channel_height_blocks`.
    channel_h = max(0, min(channel_height_blocks, divs_z - 2 * wall_z))

    raw_tetrahedra = []
    for i in range(i_lo, i_hi):
        for j in range(j_lo, j_hi):
            for k in range(k_lo, k_hi):
                is_shell = (i < wall_x or i >= divs_x - wall_x or
                            j < wall_y or j >= divs_y - wall_y or
                            k < wall_z or k >= divs_z - wall_z)
                if is_shell and channel_h > 0:
                    # Carve the connecting-channel opening: only removes
                    # material that's otherwise solid purely because it's
                    # in the -X/+X end-wall band (not e.g. a corner also
                    # in the Y-wall band), within the cavity's own width
                    # and the channel's height above the cavity floor.
                    is_x_end_wall = i < wall_x or i >= divs_x - wall_x
                    in_cavity_width = wall_y <= j < divs_y - wall_y
                    in_channel_height = wall_z <= k < wall_z + channel_h
                    if is_x_end_wall and in_cavity_width and in_channel_height:
                        is_shell = False
                if not is_shell:
                    continue
                corners = [
                    pidx(i,     j,     k),
                    pidx(i + 1, j,     k),
                    pidx(i + 1, j + 1, k),
                    pidx(i,     j + 1, k),
                    pidx(i,     j,     k + 1),
                    pidx(i + 1, j,     k + 1),
                    pidx(i + 1, j + 1, k + 1),
                    pidx(i,     j + 1, k + 1),
                ]
                for a, b, c, d in _KUHN_TETS:
                    raw_tetrahedra.append([corners[a], corners[b], corners[c], corners[d]])

    # Connecting-channel duct: a real, structurally-welded extension past
    # each built end wall's channel opening -- see this function's
    # docstring for `channel_separation_blocks`. Only for a side whose
    # end wall actually exists (not cut away by that axis's own
    # symmetry_x): its own inner face is welded directly onto the shell
    # grid's real corner indices (`pidx(inner_i, j, k)`) so it's one
    # connected FEM mesh, not a separately-mapped visual piece like the
    # cavity/outer/inner surfaces below.
    half_sep = max(0.0, channel_separation_blocks) / 2.0 * cell
    has_duct = channel_h > 0 and half_sep > 1e-9
    duct_k_hi = wall_z + channel_h + wall_z  # local bottom-wall+bore+roof span
    # Split the duct into `duct_divs_x` layers along X, each no longer
    # than one block -- a single half_sep-long layer produces badly
    # elongated, ill-conditioned tetrahedra once the real inter-chamber
    # gap exceeds about a block (confirmed: with a 40mm half_sep against
    # an 8mm block, this showed up as very long edges in the FEM element
    # display and a badly distorted zero-pressure shape).
    duct_divs_x = max(1, math.ceil(half_sep / cell - 1e-9)) if has_duct else 0
    duct_dx = half_sep / duct_divs_x if has_duct else 0.0
    duct_point_index = {}

    def get_duct_point(side, m, j, k):
        key = (side, m, j, k)
        idx = duct_point_index.get(key)
        if idx is None:
            idx = len(raw_positions)
            duct_point_index[key] = idx
            offset = m * duct_dx
            x = -(length / 2 + offset) if side == 'neg' else (length / 2 + offset)
            raw_positions.append([x, -width / 2 + j * cell, z_offset + k * cell])
        return idx

    if has_duct:
        for side, inner_i in (('neg', 0), ('pos', divs_x)):
            if side == 'neg' and symmetry_x:
                continue  # that end wall isn't built at all in this case
            for m in range(duct_divs_x):
                for j in range(j_lo, j_hi):
                    for k in range(0, duct_k_hi):
                        is_duct_shell = (j < wall_y or j >= divs_y - wall_y or
                                          k < wall_z or k >= duct_k_hi - wall_z)
                        if not is_duct_shell:
                            continue
                        # Layer m's inner face is the shell's own real
                        # nodes (welded) when m==0, otherwise the
                        # previous layer's outer face (already created,
                        # same dict key).
                        if m == 0:
                            inner = [pidx(inner_i, j, k), pidx(inner_i, j + 1, k),
                                     pidx(inner_i, j + 1, k + 1), pidx(inner_i, j, k + 1)]
                        else:
                            inner = [get_duct_point(side, m, j, k), get_duct_point(side, m, j + 1, k),
                                     get_duct_point(side, m, j + 1, k + 1), get_duct_point(side, m, j, k + 1)]
                        outer = [get_duct_point(side, m + 1, j, k), get_duct_point(side, m + 1, j + 1, k),
                                 get_duct_point(side, m + 1, j + 1, k + 1), get_duct_point(side, m + 1, j, k + 1)]
                        # Same 8-corner order build_hollow_cube_mesh's own
                        # cells use (lo-X face then hi-X face, each CCW from
                        # +Z) -- the duct's outer face is hi-X for the +X
                        # side but lo-X for the -X side, since it's further
                        # from the origin in the OPPOSITE direction there.
                        if side == 'pos':
                            corners = [inner[0], outer[0], outer[1], inner[1],
                                       inner[3], outer[3], outer[2], inner[2]]
                        else:
                            corners = [outer[0], inner[0], inner[1], outer[1],
                                       outer[3], inner[3], inner[2], outer[2]]
                        for a, b, c, d in _KUHN_TETS:
                            raw_tetrahedra.append([corners[a], corners[b], corners[c], corners[d]])

    # Drop unreferenced (deep-interior, or cut away by symmetry) points
    # and remap indices compactly.
    used = sorted({idx for tet in raw_tetrahedra for idx in tet})
    remap = {old: new for new, old in enumerate(used)}
    positions = [raw_positions[old] for old in used]
    tetrahedra = [[remap[idx] for idx in tet] for tet in raw_tetrahedra]

    # Whether a cavity-cap outline point sits on a real shell node (see
    # _capped_box_surface's `keep_point`): every node left is a corner of
    # some element.
    def node_key(p):
        return tuple(round(c / cell * 1e6) for c in p)
    node_keys = {node_key(p) for p in positions}

    def on_material(p):
        return node_key(p) in node_keys

    # Inner cavity surface: `wall_x`/`wall_y`/`wall_z` cells in from the
    # shell on each pair of faces, subdivided at the shell's own cell
    # resolution (cavity_divs_* quads per face) so its vertices coincide
    # exactly with the shell's inner boundary grid points -- both for an
    # exact BarycentricMapping and so the pressure load is spread across
    # the whole inner wall instead of concentrated at the 8 box corners.
    # Clipped to the built half at each active symmetry plane -- no wall
    # thickness subtracted there, since it's an internal cut, not a real
    # exterior wall.
    wx, wy, wz = wall_x * cell, wall_y * cell, wall_z * cell
    xmin, xmax, cavity_divs_x = _symmetric_axis_bounds(
        -length / 2 + wx, length / 2 - wx, divs_x - 2 * wall_x, symmetry_x, keep_lower_half=False)
    ymin, ymax, cavity_divs_y = _symmetric_axis_bounds(
        -width / 2 + wy, width / 2 - wy, divs_y - 2 * wall_y, symmetry_y, keep_lower_half=False)
    zmin, zmax, cavity_divs_z = _symmetric_axis_bounds(
        z_offset + wz, z_offset + height - wz, divs_z - 2 * wall_z, False, keep_lower_half=True)

    # Face(s) coinciding with an active symmetry cut plane -- '-X'/'-Y'
    # since those axes keep their +-half (so the cut sits at the box's
    # own min bound). Used below to coarsen the cavity cap (see
    # _capped_box_surface) and to leave the cut face out of the purely
    # visual outer-skin/interior-volume surfaces entirely (like an
    # automatic cutaway -- they don't need to be closed, so there's no
    # reason to give them the same unmappable-interior-points problem).
    symmetry_cut_faces = set()
    if symmetry_x:
        symmetry_cut_faces.add('-X')
    if symmetry_y:
        symmetry_cut_faces.add('-Y')

    # face_windows for the channel opening, on the cavity surface below
    # and the interior-volume visual surface further down: full cavity
    # width (already the whole box's Y extent at this resolution), first
    # channel_h cells up from the cavity floor (already local z=0 here,
    # since this box is wall-inset).
    inner_channel_windows = {}
    if channel_h > 0:
        inner_channel_windows = {'-X': (0, cavity_divs_y, 0, channel_h),
                                  '+X': (0, cavity_divs_y, 0, channel_h)}

    # -X/+X are NOT added to coarse_faces here (unlike a symmetry cut):
    # most of an end wall stays real, pressure-mappable material even
    # with the channel opening active, so only the small window itself
    # should lose its fine grid -- _capped_box_surface caps just that
    # window (via face_windows) rather than the whole face. Coarsening
    # the entire face here (an earlier version of this code) collapsed
    # nearly all its pressure-load DOFs down to the face's boundary
    # loop, leaving the actual end-wall material with almost no direct
    # pressure force and barely inflating.
    #
    # cap_windows=False when a duct is present: the window is left open
    # here and the duct's own bore surface (appended further below)
    # continues through it and caps the true far end instead, rather
    # than sealing the cavity right at this wall's own outer face.
    cavity_pts, cavity_tris = _capped_box_surface(xmin, ymin, zmin, xmax, ymax, zmax,
                                                   cavity_divs_x, cavity_divs_y, cavity_divs_z,
                                                   coarse_faces=symmetry_cut_faces,
                                                   face_windows=inner_channel_windows,
                                                   cap_windows=not has_duct,
                                                   keep_point=on_material)

    # Interior-volume visual surface: same box as the cavity above (for
    # the physics), but a separate mesh so it can have a cutaway window
    # without touching the closed surface SurfacePressureConstraint needs.
    # Symmetry cut faces are left open (skipped), not capped -- purely
    # visual, so there's no need for it to stay closed there; capping it
    # would just add a redundant flat patch sitting right where a
    # mirror_visual copy belongs (z-fighting with it) when mirroring is
    # on, for no benefit when it's off either.
    inner_pts, inner_tris = _box_surface(xmin, ymin, zmin, xmax, ymax, zmax,
                                          cavity_divs_x, cavity_divs_y, cavity_divs_z,
                                          skip_faces=set(inner_skip_faces) | symmetry_cut_faces,
                                          face_windows=inner_channel_windows)

    # Outer skin surface, at the shell's own full grid resolution so its
    # vertices coincide with the shell's actual outer boundary nodes
    # (exact BarycentricMapping, same reasoning as the cavity surface).
    # Clipped and left open the same way as the interior-volume surface
    # above.
    outer_xmin, outer_xmax, outer_divs_x = _symmetric_axis_bounds(
        -length / 2, length / 2, divs_x, symmetry_x, keep_lower_half=False)
    outer_ymin, outer_ymax, outer_divs_y = _symmetric_axis_bounds(
        -width / 2, width / 2, divs_y, symmetry_y, keep_lower_half=False)
    outer_zmin, outer_zmax, outer_divs_z = _symmetric_axis_bounds(
        z_offset, z_offset + height, divs_z, False, keep_lower_half=True)

    # face_windows for the channel opening on the outer skin: unlike the
    # interior-volume box above, this box isn't wall-inset, so both axes
    # need the wall thickness subtracted back out (and, on Y, the
    # symmetry-cut side of a Y-symmetric box has no real wall to open a
    # hole in to begin with -- it's already the whole cut face).
    outer_channel_windows = {}
    if channel_h > 0:
        y_lo = 0 if symmetry_y else wall_y
        outer_channel_windows = {'-X': (y_lo, outer_divs_y - wall_y, wall_z, wall_z + channel_h),
                                  '+X': (y_lo, outer_divs_y - wall_y, wall_z, wall_z + channel_h)}

    outer_pts, outer_tris = _box_surface(outer_xmin, outer_ymin, outer_zmin,
                                          outer_xmax, outer_ymax, outer_zmax,
                                          outer_divs_x, outer_divs_y, outer_divs_z,
                                          skip_faces=set(outer_skip_faces) | symmetry_cut_faces,
                                          face_windows=outer_channel_windows)

    # Channel duct surface pieces (cavity/interior-volume/outer-skin),
    # appended onto the surfaces above -- see this function's docstring
    # for `channel_separation_blocks`. Independent meshes BarycentricMapped
    # by spatial coincidence (like the rest of this function's visual/
    # pressure surfaces), not index-shared with the solid FEM duct built
    # above, so a single flat quad per side is enough even though it
    # spans both the existing wall_x-thick stub (already carved into the
    # end wall, from the cavity's own boundary out to that wall's true
    # outer face) and the new duct beyond it -- BarycentricMapping only
    # needs each vertex to land within some real tetrahedron, not a
    # dedicated one per shell layer, and this bore's cross-section is
    # uniform (flat) the whole way regardless.
    # Far-end symmetry-plane indicator: a purely visual, flat, distinctly
    # colored plane marking the true far end of each built duct (see
    # `channel_end_alpha` in createScene) -- separate from the outer-skin
    # rim `ext_outer_pts` above (which only draws the real wall material,
    # leaving the bore hole open). Only the REST-pose geometry is built
    # here (an axis-aligned `_flat_rect_grid`, one block bigger than the
    # duct's own cross-section on every side, subdivided into
    # block-sized squares); createScene reconstructs its LIVE, always-
    # exactly-flat position every step from a 3-point rigid frame instead
    # of BarycentricMapping each grid point individually -- the latter
    # would show whatever slight non-planarity the truss constraint's
    # spring approximation leaves in the real ring nodes it's mapped
    # from.
    end_planes = []

    if has_duct:
        zfloor_bore = z_offset + wz
        ztop_bore = z_offset + wz + channel_h * cell
        duct_ext_zmax = z_offset + duct_k_hi * cell

        for side in ('neg', 'pos'):
            if side == 'neg' and symmetry_x:
                continue  # that end wall (and its duct) isn't built at all
            if side == 'pos':
                bore_xmin, bore_xmax = xmax, length / 2 + half_sep
                ext_xmin, ext_xmax = length / 2, length / 2 + half_sep
                inner_face, outer_face = '-X', '+X'
            else:
                bore_xmin, bore_xmax = -(length / 2 + half_sep), xmin
                ext_xmin, ext_xmax = -(length / 2 + half_sep), -length / 2
                inner_face, outer_face = '+X', '-X'

            # The duct spans the full cavity width in Y, so when
            # symmetry_y is exploited its own Y=0 face is a symmetry cut
            # too, same as the main box's -- treated the same way here as
            # symmetry_cut_faces already is for the main cavity/outer/
            # inner surfaces above (capped for the cavity, left open for
            # the two visuals). Just the Y part of that set: `inner_face`/
            # `outer_face` are always X-named here, and when symmetry_x
            # is active the 'neg' duct is skipped entirely above rather
            # than needing '-X' handled specially in this box's own
            # (always locally X-named) inner/outer faces.
            y_cut_faces = symmetry_cut_faces & {'+Y', '-Y'}

            # Cavity: bore side walls, flat-capped at the new far plane
            # (a new symmetry cut), open at the inner end where it
            # continues the main cavity's own now-open window above.
            bore_cav_pts, bore_cav_tris = _capped_box_surface(
                bore_xmin, ymin, zfloor_bore, bore_xmax, ymax, ztop_bore,
                duct_divs_x, cavity_divs_y, channel_h,
                coarse_faces={outer_face} | y_cut_faces, skip_faces={inner_face},
                keep_point=on_material)
            offset = len(cavity_pts)
            cavity_pts = cavity_pts + bore_cav_pts
            cavity_tris = cavity_tris + [[i + offset for i in t] for t in bore_cav_tris]

            # Interior-volume visual: same bore box as the cavity above,
            # left open at both ends -- same "don't cap a symmetry-style
            # cut" precedent as the rest of this surface.
            bore_inner_pts, bore_inner_tris = _box_surface(
                bore_xmin, ymin, zfloor_bore, bore_xmax, ymax, ztop_bore,
                duct_divs_x, cavity_divs_y, channel_h,
                skip_faces={inner_face, outer_face} | y_cut_faces)
            offset = len(inner_pts)
            inner_pts = inner_pts + bore_inner_pts
            inner_tris = inner_tris + [[i + offset for i in t] for t in bore_inner_tris]

            # Outer skin: the duct's own exterior. Inner face hidden (an
            # internal seam flush with the main box's own already-open
            # channel window). The far end is NOT skipped outright --
            # unlike a symmetry cut through the middle of an otherwise-
            # continuous shape (which mirror_visual normally fills back
            # in), nothing fills this one in, so a fully open far end
            # left the wall's own real material thickness invisible there
            # (no rim -- confirmed by a screenshot showing the opening
            # with no visible border). Instead it's windowed with the
            # same bore rectangle as the main wall's own channel opening
            # (`outer_channel_windows`), leaving the solid rim (matching
            # real wall_y/wall_z material) drawn while only the hollow
            # bore itself stays open. '+Z'/'-Z' (the duct's own top/
            # bottom walls) stay drawn -- unlike the Y-cut face below,
            # they're real exterior surface, not an internal seam or a
            # symmetry cut.
            ext_outer_pts, ext_outer_tris = _box_surface(
                ext_xmin, outer_ymin, z_offset, ext_xmax, outer_ymax, duct_ext_zmax,
                duct_divs_x, outer_divs_y, duct_k_hi,
                skip_faces={inner_face} | y_cut_faces,
                face_windows={outer_face: outer_channel_windows[outer_face]})
            offset = len(outer_pts)
            outer_pts = outer_pts + ext_outer_pts
            outer_tris = outer_tris + [[i + offset for i in t] for t in ext_outer_tris]

            # End-plane indicator: a flat grid at the far face's own X
            # (createScene positions/orients it live -- this rest-pose
            # copy only needs to be somewhere on that plane, in
            # block-sized local units, since createScene re-derives its
            # own local (u, v) coordinates from it). One block bigger
            # than the duct's own outer cross-section in Y on every
            # side, and in Z at the bottom -- but the TOP reaches one
            # block above the whole chamber's own top face (z_offset +
            # height), not just one block above the duct's own (much
            # shorter) cross-section, so the plane stays visible above
            # the chamber even though the duct itself only spans the
            # channel opening's height near the cavity floor.
            plane_x = ext_xmax if side == 'pos' else ext_xmin
            plane_pts, plane_tris = _flat_rect_grid(
                outer_ymin - cell, outer_ymax + cell, z_offset - cell, z_offset + height + cell, cell)
            plane_pts = [[plane_x, p[1], p[2]] for p in plane_pts]
            end_planes.append({'side': side, 'pts': plane_pts, 'tris': plane_tris})

    return (positions, tetrahedra, cavity_pts, cavity_tris, outer_pts, outer_tris, inner_pts, inner_tris,
            end_planes)


def _mesh_volume(positions, tetrahedra):
    """Total volume of a tetrahedral mesh, by summing each tet's
    (unsigned) volume. Used for the shell's mass instead of an analytic
    formula based on nominal wall/cavity dimensions, since that formula
    would need a special case for every symmetry/symmetry_buffer_blocks
    combination to stay exact -- summing the actually-built tets is
    always correct regardless.
    """
    total = 0.0
    for t in tetrahedra:
        p0, p1, p2, p3 = (positions[i] for i in t)
        ax, ay, az = p1[0] - p0[0], p1[1] - p0[1], p1[2] - p0[2]
        bx, by, bz = p2[0] - p0[0], p2[1] - p0[1], p2[2] - p0[2]
        cx, cy, cz = p3[0] - p0[0], p3[1] - p0[1], p3[2] - p0[2]
        cross_x = by * cz - bz * cy
        cross_y = bz * cx - bx * cz
        cross_z = bx * cy - by * cx
        total += abs(ax * cross_x + ay * cross_y + az * cross_z) / 6.0
    return total


# ----------------------------------------------------------------------
# Controller: prints the live camera state whenever it changes, so it's
# possible to tell from the console log whether something in the GUI
# (e.g. an auto-fit-to-scene-bounds on load) is overriding the explicit
# position/orientation/distance set in createScene().
# ----------------------------------------------------------------------
class CameraPrinter(Sofa.Core.Controller):
    def __init__(self, camera, **kwargs):
        Sofa.Core.Controller.__init__(self, **kwargs)
        self.camera = camera
        self.last = None

    def onAnimateBeginEvent(self, event):
        pos = tuple(round(float(c), 5) for c in self.camera.position.value)
        dist = round(float(self.camera.distance.value), 5)
        state = (pos, dist)
        if state != self.last:
            self.last = state
            print(f"[camera] position={list(pos)}  distance={dist}")


# ----------------------------------------------------------------------
# Controller: live-mirrors one visual surface's vertex positions across
# one or more symmetry planes each step, so mirror_visual (see
# createScene) shows the complete deformed shape even though only a
# fraction of it is actually simulated. There's no BarycentricMapping
# equivalent for this -- the mirrored side has no real shell material to
# interpolate from -- so this just copies+reflects the real (already
# correctly mapped) surface's current position directly.
# ----------------------------------------------------------------------
class MirrorController(Sofa.Core.Controller):
    def __init__(self, source, target, axes, mirror_values, **kwargs):
        Sofa.Core.Controller.__init__(self, **kwargs)
        self.source = source
        self.target = target
        self.axes = axes
        self.mirror_values = mirror_values

    def onAnimateEndEvent(self, event):
        mirrored = []
        for p in self.source.position.value:
            q = list(p)
            for axis, value in zip(self.axes, self.mirror_values):
                q[axis] = 2 * value - q[axis]
            mirrored.append(q)
        self.target.position.value = mirrored


# ----------------------------------------------------------------------
# Controller: keeps a channel end-plane indicator (see createScene)
# exactly flat every step by rebuilding it from a live 3-point rigid
# frame -- the SAME 3 ring nodes the truss constraint anchors to, when
# that's enabled -- instead of following each grid point's own only-
# approximately-rigid mapped position. Any 3 points always define an
# exact plane, so this can never show the local bulge/warp a literal
# per-vertex mapping (e.g. BarycentricMapping onto the real, only
# approximately-rigid ring) could.
# ----------------------------------------------------------------------
class EndPlaneController(Sofa.Core.Controller):
    def __init__(self, dofs, target, anchor_indices, local_uv, normal_offset, **kwargs):
        Sofa.Core.Controller.__init__(self, **kwargs)
        self.dofs = dofs
        self.target = target
        self.ia, self.ib, self.ic = anchor_indices
        self.local_uv = local_uv
        self.normal_offset = normal_offset

    def onAnimateEndEvent(self, event):
        pos = self.dofs.position.value
        a, b, c = pos[self.ia], pos[self.ib], pos[self.ic]
        origin, u, v, n = _plane_basis(a, b, c)
        world = []
        for lu, lv in self.local_uv:
            world.append([origin[k] + lu * u[k] + lv * v[k] + self.normal_offset * n[k]
                          for k in range(3)])
        self.target.position.value = world


# ----------------------------------------------------------------------
# Controller: keeps a channel-end wall-crossing guard's PlaneForceField
# threshold (d) tracking the far-end plane's own live TRANSLATION along
# X, using the same 3 ring anchors as the end-plane indicator/truss --
# but, unlike the indicator (EndPlaneController, purely visual, no
# solver feedback), does NOT also rotate the guard's `normal` to match
# the plane's live tilt.
#
# A first version DID rotate `normal` too (matching the indicator
# exactly, since a static guard needlessly clamps the wall back to
# where the plane started even once it has genuinely tilted out of the
# way -- confirmed by a screenshot showing exactly that). It reliably
# went unstable (NaN) under moderate pressure. A controlled sweep (A/B
# on rotating vs. translation-only; varying the rotating version's
# update-smoothing rate, the guard's stiffness, and its damping, all
# under the same stress parameters with the mesh reloaded fresh each
# trial) showed no tuning of the rotating version was reliably stable.
# This SOFA version's PlaneForceField apparently doesn't tolerate a
# live-mutating DIRECTION well inside an implicit solve; a mutating
# threshold along a fixed direction is the same technique a slowly
# rising/falling floor would use.
#
# Even translation-only still needed its OWN update rate tuned: raw
# (unsmoothed) per-step tracking, and a couple of smoothing rates tried
# in between, were each intermittently unstable too, in a non-monotonic
# (resonance-like) pattern -- e.g. one rate failed every trial, a
# slightly slower one was clean, a slightly slower one again failed most
# trials. `SMOOTHING` below is the rate that came back clean across 8/8
# stress-test trials (900 steps each, mesh reloaded fresh every trial).
#
# This only partially addresses the plane's real motion (translation,
# not tilt) -- the safer option, not the complete one.
# ----------------------------------------------------------------------
class ChannelEndGuardController(Sofa.Core.Controller):
    SMOOTHING = 0.01

    def __init__(self, dofs, plane_force_field, anchor_indices, normal, **kwargs):
        Sofa.Core.Controller.__init__(self, **kwargs)
        self.dofs = dofs
        self.plane = plane_force_field
        self.ia, self.ib, self.ic = anchor_indices
        self.normal_x = normal[0]  # normal is always axis-aligned along X here
        self.d = None

    def onAnimateBeginEvent(self, event):
        pos = self.dofs.position.value
        a, b, c = pos[self.ia], pos[self.ib], pos[self.ic]
        origin_x = (a[0] + b[0] + c[0]) / 3.0
        raw_d = origin_x * self.normal_x
        if self.d is None:
            self.d = raw_d
        else:
            self.d = (1 - self.SMOOTHING) * self.d + self.SMOOTHING * raw_d
        self.plane.d.value = self.d


# ----------------------------------------------------------------------
# Controller: puts a channel-end wall-crossing guard's PlaneForceField
# exactly on the far-end plane, read from the Rigid3 frame that holds that
# plane (see createScene's "cube" section): the rest normal rotated by the
# frame's orientation, through the frame's origin (which lies on the
# plane). Unlike ChannelEndGuardController there's no estimate from ring
# nodes and no smoothing -- the frame IS the plane's pose -- and the tilt
# is followed too, so the chamber wall can bulge all the way to the tilted
# plane instead of stopping at a copy of its rest orientation.
# ----------------------------------------------------------------------
class EndFrameGuardController(Sofa.Core.Controller):
    def __init__(self, frame_dofs, frame_index, plane_force_field, rest_normal, **kwargs):
        Sofa.Core.Controller.__init__(self, **kwargs)
        self.frame_dofs = frame_dofs
        self.index = frame_index
        self.plane = plane_force_field
        self.rest_normal = [float(c) for c in rest_normal]

    @staticmethod
    def _rotate(q, v):
        # Quaternion [x, y, z, w] applied to vector v: v + 2w(u x v) + 2 u x (u x v).
        ux, uy, uz, w = q
        cx = uy * v[2] - uz * v[1]
        cy = uz * v[0] - ux * v[2]
        cz = ux * v[1] - uy * v[0]
        return [
            v[0] + 2 * (w * cx + uy * cz - uz * cy),
            v[1] + 2 * (w * cy + uz * cx - ux * cz),
            v[2] + 2 * (w * cz + ux * cy - uy * cx),
        ]

    def onAnimateBeginEvent(self, event):
        pose = [float(c) for c in self.frame_dofs.position.value[self.index]]
        normal = self._rotate(pose[3:7], self.rest_normal)
        self.plane.normal.value = normal
        self.plane.d.value = sum(normal[k] * pose[k] for k in range(3))


# ----------------------------------------------------------------------
# Controller: drives the cavity pressure towards a live-editable target,
# either instantly or ramped, and logs volume growth. `targetPressure`,
# `rampTime` and `instant` are exposed as SOFA Data fields, so they show
# up -- and can be edited live, mid-simulation -- in the GUI's Scene
# Graph / properties panel (select the "PressureRamp" node).
# ----------------------------------------------------------------------
class PressureRamp(Sofa.Core.Controller):
    def __init__(self, root, pressure_constraint, target_pressure, ramp_time, instant=False, **kwargs):
        Sofa.Core.Controller.__init__(self, **kwargs)
        self.root = root
        self.pressure = pressure_constraint
        self.addData(name='targetPressure', type='float', value=target_pressure,
                     help='Target gauge pressure in the cavity [Pa]. Live-editable.')
        self.addData(name='rampTime', type='float', value=ramp_time,
                     help='Time [s] to go from 0 to targetPressure when not instant. '
                          'Also limits how fast a live change in targetPressure is followed.')
        self.addData(name='instant', type='bool', value=instant,
                     help='Apply targetPressure immediately instead of ramping towards it.')
        self.current_pressure = 0.0
        self.time = 0.0
        self.next_print = 0.0

    def onAnimateBeginEvent(self, event):
        dt = self.root.dt.value
        self.time += dt
        target = self.targetPressure.value

        if self.instant.value:
            self.current_pressure = target
        else:
            ramp_time = max(self.rampTime.value, 1e-6)
            max_step = (abs(target) if target != 0 else self.pressure.pressure.value) / ramp_time * dt
            max_step = max(max_step, 1e-9)
            diff = target - self.current_pressure
            if abs(diff) <= max_step:
                self.current_pressure = target
            else:
                self.current_pressure += max_step if diff > 0 else -max_step

        self.pressure.value.value = [self.current_pressure]

    def onAnimateEndEvent(self, event):
        if self.time + 1e-9 < self.next_print:
            return
        self.next_print += 0.2
        vol = self.pressure.cavityVolume.value
        vol0 = self.pressure.initialCavityVolume.value
        applied = self.pressure.pressure.value
        growth = (vol / vol0 - 1.0) * 100.0
        mode = 'instant' if self.instant.value else 'ramp'
        print(f"t={self.time:5.2f}s  [{mode}] target={self.targetPressure.value/1000.0:6.2f} kPa  "
              f"P_applied={applied/1000.0:6.2f} kPa  "
              f"cavity volume={vol*1e6:8.2f} cm^3  (volume +{growth:5.1f}%)")
# ----------------------------------------------------------------------
# Scene
# ----------------------------------------------------------------------
def createScene(rootNode):
    launch_params_editor()

    plugins = [
        "Sofa.Component.AnimationLoop",                # FreeMotionAnimationLoop
        "Sofa.Component.Constraint.Lagrangian.Correction",  # LinearSolverConstraintCorrection
        "Sofa.Component.Constraint.Lagrangian.Solver",      # BlockGaussSeidelConstraintSolver
        "Sofa.Component.Constraint.Projective",        # PartialFixedProjectiveConstraint (symmetry BCs)
        "Sofa.Component.Engine.Select",                # BoxROI
        "Sofa.Component.LinearSolver.Direct",          # EigenSimplicialLDLT, SparseLDLSolver
        "Sofa.Component.Mapping.Linear",               # BarycentricMapping, SubsetMultiMapping
        "Sofa.Component.Mapping.NonLinear",            # RigidMapping (channel far-end rings)
        "Sofa.Component.Mass",                         # UniformMass
        "Sofa.Component.MechanicalLoad",               # PlaneForceField (symmetry no-crossing)
        "Sofa.Component.ODESolver.Backward",           # EulerImplicitSolver
        "Sofa.Component.SolidMechanics.FEM.Elastic",   # FastTetrahedralCorotationalForceField
        "Sofa.Component.SolidMechanics.Spring",        # RestShapeSpringsForceField,
                                                        # SpringForceField (channel far end)
        "Sofa.Component.StateContainer",               # MechanicalObject
        "Sofa.Component.Topology.Container.Constant",  # MeshTopology (cavity, outer skin)
        "Sofa.Component.Topology.Container.Dynamic",   # TetrahedronSetTopologyContainer
        "Sofa.Component.Setting",                      # BackgroundSetting
        "Sofa.Component.Visual",                       # VisualStyle
        "Sofa.GL.Component.Rendering3D",                # OglModel
        "Sofa.GL.Component.Shader",                     # LightManager, DirectionalLight
        "SoftRobots",                                   # SurfacePressureConstraint
    ]
    for p in plugins:
        rootNode.addObject('RequiredPlugin', name='req_' + p.replace('.', '_'), pluginName=p)

    # Plain background instead of the GUI's default SOFA-branded backdrop.
    # `image` must be cleared explicitly -- it defaults to SOFA's own
    # branding texture and takes priority over `color` when set. Note:
    # the ImGui GUI's branded backdrop is baked into its own rendering
    # code and ignores this component entirely (confirmed: GUIManager's
    # setBackgroundImage() reaches it with no error but has no visible
    # effect either) -- use `-g glfw` for a GUI that respects this.
    rootNode.addObject('BackgroundSetting', color=[0.78, 0.87, 0.96, 1.0], image="")

    interaction_flag = 'showInteractionForceFields' if SHOW_PRESSURE_OVERLAY else 'hideInteractionForceFields'
    force_fields_flag = 'showForceFields' if SHOW_FEM_ELEMENTS else 'hideForceFields'
    rootNode.addObject('VisualStyle',
                        displayFlags='showVisualModels hideBehaviorModels '
                                     'hideCollisionModels hideBoundingCollisionModels '
                                     f'{force_fields_flag} {interaction_flag} hideWireframe')

    # Pull the default camera back, up and to the side instead of the
    # tight auto-fit view (scaled off the box's largest dimension so it
    # stays well-framed if the geometry changes). SOFA's camera derives
    # orientation from position/lookAt assuming a Y-up world, but this
    # scene is Z-up (gravity = -Z), so we compute and set the orientation
    # quaternion explicitly with world-up = +Z to get a proper
    # top-down-tilted view instead of the mismatched (upside-down-looking)
    # default.
    cam_lookat = [0.0, 0.0, BASE_OFFSET + HEIGHT * 0.5]
    cam_dir = (4.5, -4.5, 3.25)  # back / to the side / up, un-normalized
    cam_dir_norm = math.sqrt(sum(c * c for c in cam_dir))
    cam_distance = CAMERA_DISTANCE
    cam_position = [l + cam_distance * c / cam_dir_norm for l, c in zip(cam_lookat, cam_dir)]
    camera = rootNode.addObject('InteractiveCamera', name='camera',
                                 position=cam_position,
                                 distance=cam_distance,
                                 orientation=_look_at_quaternion(cam_position, cam_lookat, world_up=(0.0, 0.0, 1.0)),
                                 activated=True)
    rootNode.addObject(CameraPrinter(camera, name='CameraPrinter'))

    # Explicit lighting from above (matching the Z-up "up" direction),
    # instead of relying on the GUI's default light placement.
    # `direction` turned out to mean "vector pointing towards the light",
    # not "the direction its rays travel" -- a positive Z is what puts
    # the light in the sky (confirmed: the -1.0 we had before was
    # lighting surfaces from underneath instead of from above).
    #
    # X and Y components deliberately UNEQUAL (not e.g. -0.3/-0.3): with
    # flat shading, a face's brightness is just dot(its own flat normal,
    # this direction) -- equal X/Y components make a -X-facing face and a
    # -Y-facing face receive IDENTICAL light (same dot product by
    # symmetry), so they render as the same color and are hard to tell
    # apart. Skewed like this, -X and -Y get distinct brightness.
    #
    # But a single directional light's diffuse contribution clamps to 0
    # for any face whose normal has a negative dot with it -- so +X and
    # +Y (both facing away from the light above) BOTH clamp to the same
    # ambient-only floor and are indistinguishable from each other, even
    # though -X/-Y (facing towards it) are fine. A second, dimmer light
    # aimed at the +X/+Y side (unequal X/Y components again, same
    # reasoning) fixes that pair without disturbing the first light's
    # -X/-Y distinction: each light's contribution is 0 (clamped) for the
    # faces angled away from it, so the two lights don't interfere.
    rootNode.addObject('LightManager', ambient=[0.35, 0.35, 0.35, 1.0])
    rootNode.addObject('DirectionalLight', direction=[-0.5, -0.15, 1.0])
    rootNode.addObject('DirectionalLight', color=[0.35, 0.35, 0.35, 1.0],
                        direction=[0.5, 0.2, 0.3])

    # Static ground plane (purely visual -- not simulated). Offset 0.1mm
    # below z=0 so it isn't exactly coplanar with the trunk's bottom face
    # -- coplanar triangles z-fight (flicker) since neither reliably wins
    # depth testing.
    floor_half_x = FLOOR_SIZE / 2
    floor_half_y = FLOOR_SIZE / 2
    floor_z = -1e-4
    floor_pts = [
        [-floor_half_x, -floor_half_y, floor_z],
        [floor_half_x, -floor_half_y, floor_z],
        [floor_half_x, floor_half_y, floor_z],
        [-floor_half_x, floor_half_y, floor_z],
    ]
    floor_tris = [[0, 1, 2], [0, 2, 3]]
    floor = rootNode.addChild('floor')
    floor.addObject('MeshTopology', name='topo', position=floor_pts, triangles=floor_tris)
    floor.addObject('OglModel', name='visual', src='@topo', color=[0.08, 0.28, 0.1, 1.0])

    # Static "trunk" (purely visual -- not simulated), a rigid brown block
    # spanning the floor-to-box gap created by BASE_OFFSET, filling exactly
    # the ATTACH_* footprint -- i.e. showing which part of the bottom face
    # is actually clamped to fixed world by the BoxROI/RestShapeSprings
    # below, rather than implying the whole base is attached when it isn't.
    # Its top face is nudged 0.1mm below the cube's actual bottom (at
    # BASE_OFFSET) for the same z-fighting reason as the floor's offset
    # above -- exactly coplanar triangles flicker since neither reliably
    # wins depth testing.
    trunk_pts, trunk_tris = _box_surface(ATTACH_XMIN, ATTACH_YMIN, 0.0,
                                          ATTACH_XMAX, ATTACH_YMAX, BASE_OFFSET - 1e-4,
                                          1, 1, 1)
    trunk_pts, trunk_tris = _flat_shaded(trunk_pts, trunk_tris)
    trunk = rootNode.addChild('trunk')
    trunk.addObject('MeshTopology', name='topo', position=trunk_pts, triangles=trunk_tris)
    trunk.addObject('OglModel', name='visual', src='@topo', color=[0.4, 0.26, 0.13, 1.0])

    # Static X (red) / Y (green) direction arrows from the world origin,
    # lying flat on the floor (purely visual -- not simulated). Each
    # arrow's tip clears its OWN axis's box half-extent by a comfortable
    # margin, rather than both sharing one length derived from the box's
    # single largest dimension -- otherwise whichever axis happens to be
    # the box's longest ends up with its own arrow buried under the box
    # footprint instead of visibly poking out past it (tip only ~20%
    # beyond the edge). Thickness/head size still come from the shared
    # reference scale so both arrows look consistently proportioned.
    # Raised 0.1mm above the floor for the same z-fighting reason as the
    # trunk/floor offsets above.
    arrow_ref = 0.6 * max(LENGTH, WIDTH, HEIGHT)
    arrow_head_len = arrow_ref * 0.2
    arrow_shaft_half = arrow_ref * 0.015
    arrow_head_half = arrow_shaft_half * 3.0
    arrow_z = 1e-4
    arrow_clearance = 1.6  # tip extends this many times the box's own half-extent
    arrow_totals = {
        0: max(arrow_ref, arrow_clearance * (LENGTH / 2) + arrow_head_len),
        1: max(arrow_ref, arrow_clearance * (WIDTH / 2) + arrow_head_len),
    }

    for name, axis, color in (('arrow_x', 0, [0.9, 0.1, 0.1, 1.0]),
                               ('arrow_y', 1, [0.1, 0.8, 0.1, 1.0])):
        arrow_shaft_len = arrow_totals[axis] - arrow_head_len
        pts, tris = _build_axis_arrow(axis, arrow_shaft_len, arrow_head_len,
                                       arrow_shaft_half, arrow_head_half)
        pts = [[p[0], p[1], p[2] + arrow_z] for p in pts]
        pts, tris = _flat_shaded(pts, tris)
        arrow = rootNode.addChild(name)
        arrow.addObject('MeshTopology', name='topo', position=pts, triangles=tris)
        arrow.addObject('OglModel', name='visual', src='@topo', color=color)

    # Big X (red) / Y (green) letters just past each arrow's tip,
    # continuing along the arrow's own line -- same flat-on-the-floor,
    # purely-visual treatment as the arrows.
    letter_half = arrow_ref * 0.09
    letter_gap = arrow_ref * 0.08
    letter_stroke_half = letter_half * 0.125
    letter_z0, letter_z1 = arrow_z, arrow_z + arrow_shaft_half * 2

    for name, strokes, color in (
        ('label_x', _letter_x_strokes(arrow_totals[0] + letter_gap + letter_half, 0.0, letter_half),
         [0.9, 0.1, 0.1, 1.0]),
        ('label_y', _letter_y_strokes(0.0, arrow_totals[1] + letter_gap + letter_half, letter_half),
         [0.1, 0.8, 0.1, 1.0]),
    ):
        pts, tris = _build_letter_glyph(strokes, letter_stroke_half, letter_z0, letter_z1)
        pts, tris = _flat_shaded(pts, tris)
        label = rootNode.addChild(name)
        label.addObject('MeshTopology', name='topo', position=pts, triangles=tris)
        label.addObject('OglModel', name='visual', src='@topo', color=color)

    rootNode.gravity = GRAVITY
    rootNode.dt = DT

    rootNode.addObject('FreeMotionAnimationLoop')
    rootNode.addObject('DefaultVisualManagerLoop')
    rootNode.addObject('BlockGaussSeidelConstraintSolver', maxIterations=500, tolerance=1e-8)

    # ---- build the mesh -------------------------------------------------
    (positions, tetrahedra, cavity_pts, cavity_tris, outer_pts, outer_tris, inner_pts, inner_tris,
     end_planes) = \
        build_hollow_cube_mesh(z_offset=BASE_OFFSET,
                                symmetry_x=SYMMETRY_X, symmetry_y=SYMMETRY_Y,
                                symmetry_buffer_blocks=SYMMETRY_BUFFER_BLOCKS,
                                channel_height_blocks=CHANNEL_HEIGHT_BLOCKS,
                                channel_separation_blocks=CHANNEL_SEPARATION_BLOCKS,
                                outer_skip_faces=CUTAWAY_FACES, inner_skip_faces=INTERIOR_CUTAWAY_FACES)
    total_mass = DENSITY * _mesh_volume(positions, tetrahedra)

    # ---- cube (silicone shell) ------------------------------------------
    # Far-end plane of each built channel duct (see build_hollow_cube_mesh's
    # `end_planes`): the true midpoint between this chamber and its
    # neighbour. With channel_end_constraint on, every FEM node on that
    # plane (its "ring") is rigidly attached to one Rigid3 frame per plane
    # -- a hard constraint, not the stiff-spring truss PneuNetFinger.py
    # uses -- and that frame may only translate along X and rotate about Y.
    #
    # SOFA's usual way to make part of a deformable body rigid, without a
    # second solved system or any coupling spring:
    #   finger (ODE + linear solver for everything below)
    #   |-- rigidEnds: Rigid3 frames (projective constraint: X, rotY free)
    #   |   `-- ringNodes: the ring nodes, RigidMapping from those frames
    #   |-- freeNodes: every other FEM node, plain Vec3 DOFs
    #   `-- cube (child of BOTH freeNodes and ringNodes): the full FEM node
    #       set, re-assembled by SubsetMultiMapping; FEM, mass, cavity and
    #       visuals live here unchanged.
    # The rigid parts' DOFs are just 2 of the frame's 6, so the solver
    # needs a scalar (not 3x3-block) sparse matrix: SparseLDLSolver with
    # CompressedRowSparseMatrixd, and GenericConstraintCorrection for the
    # constraint solve over the whole mixed system.
    ring_eps = 1e-4
    ring_frames = []  # (side, [node indices]) per rigidly held far-end plane
    if CHANNEL_END_CONSTRAINT:
        for plane in end_planes:
            far_x = plane['pts'][0][0]  # already the true far-end X (see build_hollow_cube_mesh)
            ring = [i for i, p in enumerate(positions) if abs(p[0] - far_x) < ring_eps]
            if ring:
                ring_frames.append((plane['side'], ring))

    finger = rootNode.addChild('finger')

    if ring_frames:
        finger.addObject('EulerImplicitSolver', name='odesolver', rayleighStiffness=0.1, rayleighMass=0.1)
        finger.addObject('SparseLDLSolver', name='linearSolver', template='CompressedRowSparseMatrixd')
        frame_of = {}
        frames = []
        for f, (side, ring) in enumerate(ring_frames):
            # Frame origin = the ring's rest centroid: the pivot the plane
            # rotates about (its Z is held, its X is free).
            c = [sum(positions[i][k] for i in ring) / len(ring) for k in range(3)]
            frames.append([c[0], c[1], c[2], 0.0, 0.0, 0.0, 1.0])
            for i in ring:
                frame_of[i] = f
        ring_nodes = sorted(frame_of)
        free_nodes = [i for i in range(len(positions)) if i not in frame_of]

        rigid = finger.addChild('rigidEnds')
        rigid_dofs = rigid.addObject('MechanicalObject', name='dofs', template='Rigid3', position=frames)
        # fixedDirections for Rigid3: [tx, ty, tz, rx, ry, rz], 1 = held.
        rigid.addObject('PartialFixedProjectiveConstraint', name='endPlaneMotion',
                         indices=list(range(len(frames))), fixedDirections=[0, 1, 1, 1, 0, 1])
        ring_node = rigid.addChild('ringNodes')
        ring_dofs = ring_node.addObject('MechanicalObject', name='dofs', template='Vec3',
                                         position=[positions[i] for i in ring_nodes])
        # globalToLocalCoords: the positions above are in world space; the
        # mapping converts them to each frame's local space itself.
        ring_node.addObject('RigidMapping', name='mapping', input='@../dofs', output='@dofs',
                             globalToLocalCoords=True, rigidIndexPerPoint=[frame_of[i] for i in ring_nodes])

        free = finger.addChild('freeNodes')
        free_dofs = free.addObject('MechanicalObject', name='dofs', template='Vec3',
                                    position=[positions[i] for i in free_nodes])
        cube = free.addChild('cube')
        ring_node.addChild(cube)
        # Projective constraints (the symmetry planes below) can only act
        # on independent DOFs -- the free nodes here, not the mapped cube.
        projective_node = free
    else:
        # No rigid far ends: exactly PneuNetFinger.py's own setup, solvers
        # in `cube` itself (LinearSolverConstraintCorrection below only
        # looks for its linear solver in its own node).
        cube = finger.addChild('cube')
        cube.addObject('EulerImplicitSolver', name='odesolver', rayleighStiffness=0.1, rayleighMass=0.1)
        cube.addObject('EigenSimplicialLDLT', template='CompressedRowSparseMatrixMat3x3')
        projective_node = cube

    cube.addObject('TetrahedronSetTopologyContainer', name='container',
                    position=positions, tetrahedra=tetrahedra)
    cube.addObject('TetrahedronSetTopologyModifier')

    cube_dofs = cube.addObject('MechanicalObject', name='dofs', template='Vec3', position=positions)
    if ring_frames:
        free_index = {n: k for k, n in enumerate(free_nodes)}
        ring_index = {n: k for k, n in enumerate(ring_nodes)}
        index_pairs = []
        for i in range(len(positions)):
            index_pairs += [0, free_index[i]] if i in free_index else [1, ring_index[i]]
        cube.addObject('SubsetMultiMapping', name='mapping',
                        input=[free_dofs.getLinkPath(), ring_dofs.getLinkPath()],
                        output='@dofs', indexPairs=index_pairs)
    cube.addObject('UniformMass', totalMass=total_mass)
    cube.addObject('FastTetrahedralCorotationalForceField', name='FEM', method='large',
                    youngModulus=YOUNG_MODULUS, poissonRatio=POISSON_RATIO)
    # Note: this force field's built-in "show elements" draw path (the
    # showForceFields display flag) is hard-opaque -- its drawColor1-4
    # ignore the alpha channel entirely (no GL_BLEND anywhere in that
    # code path). For an actually-transparent view of the mesh, that
    # flag is off and the visu/ OglModel below (which does support
    # blending) is tinted blue with the wireframe shown on top instead.

    # Clamp the ATTACH_* footprint of the bottom face to a rigid base (like
    # a pneumatic actuator mounted on a fixed manifold) -- see the trunk
    # visual above, which shows this same region.
    cube.addObject('BoxROI', name='baseROI',
                    box=[ATTACH_XMIN - 1e-4, ATTACH_YMIN - 1e-4, BASE_OFFSET - 1e-4,
                         ATTACH_XMAX + 1e-4, ATTACH_YMAX + 1e-4, BASE_OFFSET + 1e-4],
                    drawBoxes=True, position='@dofs.rest_position')
    cube.addObject('RestShapeSpringsForceField', points='@baseROI.indices', stiffness=1e12)

    # Symmetry boundary conditions: points on each active cut plane are
    # locked to zero displacement in that plane's normal direction only
    # (PartialFixedProjectiveConstraint), so they stay on the plane while
    # still sliding freely within it -- this is what makes the reduced
    # model physically equivalent to simulating the full mirrored one.
    #
    # CAVEAT: only valid for a plane the loaded, constrained problem is
    # actually symmetric about. X and Y qualify here -- the trunk/base
    # clamp (ATTACH_*) and the channel openings are both centered on X,
    # the trunk is centered on Y too, and gravity/pressure don't break
    # either. No Z entry here (unlike HollowCube): the box is clamped
    # only at its bottom, not top and bottom, so it wouldn't be valid.
    sym_eps = 1e-4

    def _add_plane_guard(name, box, plane_normal, plane_d):
        # One-sided (bilateral=False, the default): only pushes back
        # points that have crossed to the wrong side of `plane_normal`/
        # `plane_d`, restricted to whichever nodes' REST position falls
        # in `box` (via a SubsetMapping) -- so it applies to EVERY such
        # point in the mesh, not just the ones that started exactly on
        # the plane, catching points elsewhere that fold across it under
        # large deformation (e.g. a collapse under negative pressure).
        # Stiff enough to act as a hard stop; the direct linear solver
        # (EigenSimplicialLDLT) handles that without instability, same
        # reasoning as the 1e12 base-clamp spring above.
        #
        # The rest-position `box` restriction (rather than applying to
        # the whole cube) matters for two distinct reasons depending on
        # the caller: when this axis's symmetry IS exploited and
        # symmetry_buffer_blocks > 0, the buffer's own nodes sit on the
        # "wrong" side of the plane AT REST BY DESIGN, so an unrestricted
        # guard would immediately treat them as "already crossed" and
        # slam them with the full 1e9 stiffness fighting their own
        # legitimate rest position (the original blow-up this avoids);
        # when symmetry is NOT exploited, `box` instead just picks out
        # "this side only" so the two guards (see below) don't fight
        # each other across the plane.
        cube.addObject('BoxROI', name=name + 'ROI', box=box, drawBoxes=False,
                        position='@dofs.rest_position')
        guard = cube.addChild(name)
        guard.addObject('MechanicalObject', name='mstate')
        guard.addObject('SubsetMapping', input='@..', output='@mstate',
                         indices='@../' + name + 'ROI.indices')
        return guard.addObject('PlaneForceField', name=name + 'Plane',
                                normal=plane_normal, d=plane_d,
                                stiffness=1e9, damping=1e4, bilateral=False)

    # `pos_*`/`neg_*` describe the plane guard on each side of the axis's
    # midplane -- `pos` is also the "kept" (built) half when that axis's
    # symmetry IS exploited. Every axis's midplane physically exists
    # regardless of whether it's being exploited to halve the FEM element
    # count, so prevent_symmetry_crossing guards it either way: with one
    # guard restricted to the built half when exploited (see
    # _add_plane_guard above for why), or with both when not (nothing to
    # restrict to -- the full mesh already has material on both sides).
    for exploited, name, fixed_directions, cut_box, mirrored, \
            pos_box, pos_normal, pos_d, neg_box, neg_normal, neg_d in (
        (SYMMETRY_X, 'symX', [1, 0, 0],
         [-sym_eps, -WIDTH, BASE_OFFSET - HEIGHT, sym_eps, WIDTH, BASE_OFFSET + 2 * HEIGHT],
         MIRROR_VISUAL_X,
         [-sym_eps, -WIDTH, BASE_OFFSET - HEIGHT, LENGTH, WIDTH, BASE_OFFSET + 2 * HEIGHT], [1, 0, 0], 0.0,
         [-LENGTH, -WIDTH, BASE_OFFSET - HEIGHT, sym_eps, WIDTH, BASE_OFFSET + 2 * HEIGHT], [-1, 0, 0], 0.0),
        (SYMMETRY_Y, 'symY', [0, 1, 0],
         [-LENGTH, -sym_eps, BASE_OFFSET - HEIGHT, LENGTH, sym_eps, BASE_OFFSET + 2 * HEIGHT],
         MIRROR_VISUAL_Y,
         [-LENGTH, -sym_eps, BASE_OFFSET - HEIGHT, LENGTH, WIDTH, BASE_OFFSET + 2 * HEIGHT], [0, 1, 0], 0.0,
         [-LENGTH, -WIDTH, BASE_OFFSET - HEIGHT, LENGTH, sym_eps, BASE_OFFSET + 2 * HEIGHT], [0, -1, 0], 0.0),
    ):
        if exploited:
            # Skip the debug box outline once this axis's own
            # mirror_visual_* is filling in the rest of the shape --
            # redundant clutter once the render already shows the
            # complete model there; still useful as a visual cue for
            # where the cut is when that plane is left un-mirrored.
            projective_node.addObject('BoxROI', name=name + 'ROI', box=cut_box,
                                       drawBoxes=not mirrored, position='@dofs.rest_position')
            projective_node.addObject('PartialFixedProjectiveConstraint', name=name,
                                       indices='@' + name + 'ROI.indices', fixedDirections=fixed_directions)
            if PREVENT_SYMMETRY_CROSSING:
                _add_plane_guard(name + 'Kept', pos_box, pos_normal, pos_d)
        elif PREVENT_SYMMETRY_CROSSING:
            _add_plane_guard(name + 'Pos', pos_box, pos_normal, pos_d)
            _add_plane_guard(name + 'Neg', neg_box, neg_normal, neg_d)

    # Far-end planes: held rigid by the rigidEnds frames set up with the
    # shell above (a hard constraint) -- this is where PneuNetFinger.py
    # builds its stiff-spring truss instead.

    # Guard against the chamber's own end-wall material bulging outward
    # past the far-end plane under pressure -- same one-sided
    # PlaneForceField mechanism as PREVENT_SYMMETRY_CROSSING's midplane
    # guards above (_add_plane_guard), just at that plane's X instead of
    # 0. Without this, a large enough bulge could reach past the
    # (approximately rigid) duct ring sitting at that plane and interact
    # with it physically, pushing the plane outward with force that has
    # nothing to do with the real inter-chamber tunnel.
    #
    # With the far end held by a rigid frame (ring_frames, above) the guard
    # follows that frame exactly -- tilt included -- via
    # EndFrameGuardController, so the bellows can expand all the way to the
    # tilted plane. The notes below apply to the fallback without frames,
    # where the plane's pose has to be estimated from 3 ring nodes.
    #
    # _add_plane_guard's `d` here is only a REST-pose seed:
    # ChannelEndGuardController overwrites it every step from the SAME
    # 3-anchor ring the end-plane indicator uses, tracking the plane's
    # actual TRANSLATION along X instead of staying frozen at rest --
    # see that controller's own comment for why it deliberately does
    # NOT also track the plane's tilt (a rotating guard turned out to
    # reliably destabilize the solver; translation-only is the safe
    # partial fix for the "wall clamped to where the plane started"
    # problem a screenshot showed).
    #
    # Restricted (via _add_plane_guard's own REST-position BoxROI) to
    # |x| <= LENGTH/2 -- real chamber wall/interior material, stopping
    # exactly at the wall's own true outer face. The duct/tunnel's own
    # material beyond that (out to the far plane itself) is deliberately
    # excluded: its ring nodes are already held (approximately) rigid by
    # the CHANNEL_END_CONSTRAINT truss above when that's enabled, so
    # guarding them here too would be redundant at best and could fight
    # those springs at worst.
    if PREVENT_CHANNEL_END_CROSSING:
        far_half_sep = max(0.0, CHANNEL_SEPARATION_BLOCKS) / 2.0 * CELL
        for plane in end_planes:
            side = plane['side']
            if side == 'pos':
                far_x = LENGTH / 2 + far_half_sep
                box = [-LENGTH, -WIDTH, BASE_OFFSET - HEIGHT,
                       LENGTH / 2 + sym_eps, WIDTH, BASE_OFFSET + 2 * HEIGHT]
                normal = [-1, 0, 0]
            else:
                far_x = -(LENGTH / 2 + far_half_sep)
                box = [-LENGTH / 2 - sym_eps, -WIDTH, BASE_OFFSET - HEIGHT,
                       LENGTH, WIDTH, BASE_OFFSET + 2 * HEIGHT]
                normal = [1, 0, 0]

            # Same 3 ring anchors as the truss/indicator above (see their
            # own comments) -- only used here to read the plane's live
            # TRANSLATION (their centroid's X), not its tilt; see
            # ChannelEndGuardController for why.
            ring_indices = [i for i, p in enumerate(positions) if abs(p[0] - far_x) < sym_eps]
            anchor_a = min(ring_indices, key=lambda i: positions[i][1] + positions[i][2])
            anchor_b = max(ring_indices, key=lambda i: positions[i][1] + positions[i][2])
            anchor_c = min(ring_indices, key=lambda i: positions[i][1] - positions[i][2])

            plane_ff = _add_plane_guard('channelEnd' + side.capitalize() + 'Guard', box, normal, -far_x)
            frame_index = next((f for f, (s, _) in enumerate(ring_frames) if s == side), None)
            if frame_index is not None:
                cube.addObject(EndFrameGuardController(
                    rigid_dofs, frame_index, plane_ff, normal,
                    name='channelEndGuardCtrl' + side.capitalize()))
            else:
                cube.addObject(ChannelEndGuardController(
                    cube_dofs, plane_ff, (anchor_a, anchor_b, anchor_c), normal,
                    name='channelEndGuardCtrl' + side.capitalize()))

    if ring_frames:
        finger.addObject('GenericConstraintCorrection', name='constraintCorrection')
    else:
        cube.addObject('LinearSolverConstraintCorrection')

    # ---- cavity (air chamber) -------------------------------------------
    cavity = cube.addChild('cavity')
    cavity.addObject('MeshTopology', name='topo', position=cavity_pts, triangles=cavity_tris)
    cavity.addObject('MechanicalObject', name='cavityDofs', src='@topo')
    pressure = cavity.addObject('SurfacePressureConstraint', name='pressure',
                                 triangles='@topo.triangles',
                                 valueType='pressure', value=0)
    cavity.addObject('BarycentricMapping', name='mapping', mapForces=False, mapMasses=False)

    # ---- visualization -----------------------------------------------
    # Procedurally-generated outer skin (not derived from the tetrahedra
    # via Tetra2Triangle) so CUTAWAY_FACES can simply omit a face for a
    # look-inside view -- extracting an arbitrary boundary subset from
    # the tet mesh directly would need per-tet orientation handling this
    # sidesteps entirely. Mapped onto the shell the same way the cavity
    # surface is (BarycentricMapping; vertices coincide with the shell's
    # actual outer-boundary grid nodes, so the mapping is exact).
    visu = cube.addChild('visu')
    # No wireframe override here: `showWireframe` switches OpenGL to
    # line-only rendering (GL_LINE) for the whole subtree, replacing the
    # filled surface rather than overlaying it -- it looked like a
    # translucent solid at low alpha only because many overlapping
    # semi-transparent lines blend together, but at alpha=1 that breaks
    # down into a sparse, mostly-see-through line grid. Plain filled
    # rendering (inherited from the root VisualStyle's hideWireframe)
    # respects wall_alpha correctly across its whole 0-1 range.
    flat_outer_pts, flat_outer_tris = _flat_shaded(outer_pts, outer_tris)
    visu.addObject('MeshTopology', name='topo', position=flat_outer_pts, triangles=flat_outer_tris)
    visu_ogl = visu.addObject('OglModel', name='visual', src='@topo', color=[0.15, 0.45, 0.95, WALL_ALPHA])
    visu.addObject('BarycentricMapping', name='mapping', mapForces=False, mapMasses=False)

    # Interior-volume visual surface: same geometry as the (physics-only,
    # never rendered) cavity surface above, but as its own mesh so it can
    # have its own cutaway window without touching the closed surface the
    # pressure/volume computation needs. Same BarycentricMapping pattern
    # as the outer skin, just onto the shell's inner-boundary nodes.
    interior_visu = cube.addChild('interior_visu')
    flat_inner_pts, flat_inner_tris = _flat_shaded(inner_pts, inner_tris)
    interior_visu.addObject('MeshTopology', name='topo', position=flat_inner_pts, triangles=flat_inner_tris)
    interior_visu_ogl = interior_visu.addObject('OglModel', name='visual', src='@topo',
                                                 color=[0.95, 0.6, 0.1, INTERIOR_ALPHA])
    interior_visu.addObject('BarycentricMapping', name='mapping', mapForces=False, mapMasses=False)

    # Far-end symmetry-plane indicator (see build_hollow_cube_mesh's
    # `end_planes`): a flat, distinctly colored plane marking where each
    # built duct's far end (a new symmetry plane) is and how it moves --
    # purely a visual aid, alpha 0 (default) hides it. Independent of
    # CHANNEL_END_CONSTRAINT -- useful either way to see where this
    # plane is. Kept exactly flat every step by EndPlaneController
    # instead of BarycentricMapping (see that class's docstring); driven
    # through its own MechanicalObject + IdentityMapping into the
    # OglModel, same pattern as the mirror_visual_* surfaces below.
    # cullFace=0 so it's visible from both sides regardless of camera
    # angle, since it isn't real exterior skin with a single outward
    # side. A child of `rootNode`, NOT of `cube`: `cube` has its own ODE
    # solver assembling/solving a matrix over its whole subtree, and an
    # extra plain MechanicalObject there (no mapping tying it into that
    # system) gets swept into that assembly and segfaults -- the exact
    # failure this file already hit (and documented above) with the
    # abandoned Rigid3-in-`cube` approach. `rootNode`-level, purely
    # controller-driven, is the same safe pattern mirror_visual_* below
    # already uses.
    end_eps = 1e-4  # [m] nudge past the real wall rim, avoiding Z-fighting
    for plane in end_planes:
        side = plane['side']
        far_x = plane['pts'][0][0]  # already the true far-end X (see build_hollow_cube_mesh)
        ring_indices = [i for i, p in enumerate(positions) if abs(p[0] - far_x) < sym_eps]

        # Same 3-anchor choice (diagonally opposite ring corners) as the
        # truss constraint above -- see its own comment for why 3
        # non-collinear points are needed. Any 3 points define an exact
        # plane, so which 3 doesn't affect flatness; reusing that same
        # choice just keeps this plane moving consistently with what the
        # constraint (when enabled) actually holds rigid.
        anchor_a = min(ring_indices, key=lambda i: positions[i][1] + positions[i][2])
        anchor_b = max(ring_indices, key=lambda i: positions[i][1] + positions[i][2])
        anchor_c = min(ring_indices, key=lambda i: positions[i][1] - positions[i][2])

        a0, b0, c0 = positions[anchor_a], positions[anchor_b], positions[anchor_c]
        origin0, u0, v0, n0 = _plane_basis(a0, b0, c0)
        # `normal_offset` should nudge OUTWARD (away from the box), not
        # into it -- n0's sign depends on the anchors' arbitrary winding,
        # so pick whichever sign of n0 actually points that way.
        outward = 1.0 if side == 'pos' else -1.0
        normal_offset = end_eps if n0[0] * outward > 0 else -end_eps

        local_uv = []
        for p in plane['pts']:
            d = _vec_sub(p, origin0)
            local_uv.append((sum(d[k] * u0[k] for k in range(3)),
                              sum(d[k] * v0[k] for k in range(3))))

        end_plane = rootNode.addChild('channelEndPlane' + side.capitalize())
        end_plane.addObject('MeshTopology', name='topo', position=plane['pts'], triangles=plane['tris'])
        end_plane_mstate = end_plane.addObject('MechanicalObject', name='mstate', src='@topo')
        end_plane.addObject('OglModel', name='visual', src='@topo',
                             color=[0.85, 0.1, 0.85, CHANNEL_END_ALPHA], cullFace=0)
        end_plane.addObject('IdentityMapping', input='@mstate', output='@visual')
        end_plane.addObject(EndPlaneController(cube_dofs, end_plane_mstate,
                                                (anchor_a, anchor_b, anchor_c), local_uv, normal_offset,
                                                name='endPlaneCtrl'))

    # mirror_visual_x/y: complete the visual model by live-mirroring the
    # outer-skin/interior-volume surfaces across each enabled symmetry
    # plane -- and both together, if both are enabled (X+Y needs an
    # X-only, a Y-only, AND an XY-diagonal copy to fill in all 4
    # quadrants). Each axis only participates if BOTH its symmetry_*
    # flag AND its own mirror_visual_* are on, so a plane can be left
    # un-mirrored (open) even while the other is fully reconstructed.
    # Purely visual -- there's no equivalent physics mesh on the mirrored
    # side, so this can't use BarycentricMapping (same reason the
    # cavity's own symmetry cap needed _capped_box_surface instead);
    # MirrorController just copies+reflects the real surface's
    # already-computed position each step.
    sym_axes = []
    if SYMMETRY_X and MIRROR_VISUAL_X:
        sym_axes.append((0, 0.0))
    if SYMMETRY_Y and MIRROR_VISUAL_Y:
        sym_axes.append((1, 0.0))

    if sym_axes:
        for r in range(1, len(sym_axes) + 1):
            for combo in itertools.combinations(sym_axes, r):
                axes = tuple(a for a, _ in combo)
                values = tuple(v for _, v in combo)
                suffix = ''.join('XYZ'[a] for a in axes)

                # A plain write into the OglModel's own position doesn't
                # reliably reach the renderer (it isn't driven by a real
                # SOFA Mapping, so nothing signals the draw pipeline that
                # it changed) -- same pattern as every other visual piece
                # in this scene instead: a MechanicalObject holds the
                # actual (controller-driven) position, and IdentityMapping
                # propagates it to the OglModel each step.
                #
                # Mirrored from the FLATTENED (flat_outer_pts/_tris, not
                # outer_pts/outer_tris) source: MirrorController copies
                # source.position to target.position index-for-index each
                # step (no mapping, just a raw per-index loop), so the two
                # must have identical point count/order -- and visu_ogl's
                # own topology is the flattened one.
                m_outer_pts, m_outer_tris = _mirror_surface(flat_outer_pts, flat_outer_tris, axes, values)
                mirror_outer = rootNode.addChild('visu_mirror_' + suffix)
                mirror_outer.addObject('MeshTopology', name='topo', position=m_outer_pts, triangles=m_outer_tris)
                mirror_outer_mstate = mirror_outer.addObject('MechanicalObject', name='mstate', src='@topo')
                mirror_outer.addObject('OglModel', name='visual', src='@topo',
                                        color=[0.15, 0.45, 0.95, WALL_ALPHA])
                mirror_outer.addObject('IdentityMapping', input='@mstate', output='@visual')
                mirror_outer.addObject(MirrorController(visu_ogl, mirror_outer_mstate, axes, values,
                                                          name='mirrorCtrl'))

                m_inner_pts, m_inner_tris = _mirror_surface(flat_inner_pts, flat_inner_tris, axes, values)
                mirror_inner = rootNode.addChild('interior_visu_mirror_' + suffix)
                mirror_inner.addObject('MeshTopology', name='topo', position=m_inner_pts, triangles=m_inner_tris)
                mirror_inner_mstate = mirror_inner.addObject('MechanicalObject', name='mstate', src='@topo')
                mirror_inner.addObject('OglModel', name='visual', src='@topo',
                                        color=[0.95, 0.6, 0.1, INTERIOR_ALPHA])
                mirror_inner.addObject('IdentityMapping', input='@mstate', output='@visual')
                mirror_inner.addObject(MirrorController(interior_visu_ogl, mirror_inner_mstate, axes, values,
                                                          name='mirrorCtrl'))

    rootNode.addObject(PressureRamp(rootNode, pressure, TARGET_PRESSURE, RAMP_TIME,
                                     instant=INSTANT, name='PressureRamp'))

    return rootNode


# ----------------------------------------------------------------------
# Headless standalone run (python PneuNetFinger.py)
# ----------------------------------------------------------------------
def main():
    import Sofa.Simulation

    # Headless entry point -- the SOFA GUI (run_imgui.bat/run_glfw.bat)
    # never calls main() at all, it loads this file and calls
    # createScene() directly, so this only ever suppresses the editor for
    # a plain `python PneuNetFinger.py` run (setdefault so an operator
    # who explicitly wants it anyway can still unset/override this first).
    os.environ.setdefault('BETTERFINGER_NO_EDITOR', '1')

    root = Sofa.Core.Node("root")
    createScene(root)
    Sofa.Simulation.init(root)

    duration = RAMP_TIME + 2.0
    steps = int(duration / DT)
    for _ in range(steps):
        Sofa.Simulation.animate(root, DT)

    Sofa.Simulation.unload(root)


if __name__ == '__main__':
    main()
